# Photovoltaic cell, single-Si; 2018 consumption mix, at wholesale

Dataset: openLCA process, unit process
Category: 42: Wholesale Trade/4236: Household Appliances and Electrical and Electronic Goods Merchant Wholesalers
Geography: United States
Time period: 2018-01-01 to 2018-12-31
Data quality: US EPA - Process Pedigree Matrix (5;1)
Exchange data quality scheme: US EPA - Flow Pedigree Matrix
isCopyrightProtected: false
restrictionsDescription: This data/work was created by employees of the National Institute of Standards and Technology (NIST), an agency of the Federal Government. Pursuant to title 17 United States Code Section 105, works of NIST employees are not subject to copyright protection in the United States.  This data/work may be subject to foreign copyright.
The data/work is provided by NIST as a public service and is expressly provided “AS IS.” NIST MAKES NO WARRANTY OF ANY KIND, EXPRESS, IMPLIED OR STATUTORY, INCLUDING, WITHOUT LIMITATION, THE IMPLIED WARRANTY OF MERCHANTABILITY, FITNESS FOR A PARTICULAR PURPOSE, NON-INFRINGEMENT AND DATA ACCURACY. NIST does not warrant or make any representations regarding the use of the data or the results thereof, including but not limited to the correctness, accuracy, reliability or usefulness of the data. NIST SHALL NOT BE LIABLE AND YOU HEREBY RELEASE NIST FROM LIABILITY FOR ANY INDIRECT, CONSEQUENTIAL, SPECIAL, OR INCIDENTAL DAMAGES (INCLUDING DAMAGES FOR LOSS OF BUSINESS PROFITS, BUSINESS INTERRUPTION, LOSS OF BUSINESS INFORMATION, AND THE LIKE), WHETHER ARISING IN TORT, CONTRACT, OR OTHERWISE, ARISING FROM OR RELATING TO THE DATA (OR THE USE OF OR INABILITY TO USE THIS DATA), EVEN IF NIST HAS BEEN ADVISED OF THE POSSIBILITY OF SUCH DAMAGES.
To the extent that NIST may hold copyright in countries other than the United States, you are hereby granted the non-exclusive irrevocable and unconditional right to print, publish, prepare derivative works and distribute the NIST data, in any medium, or authorize others to do so on your behalf, on a royalty-free basis throughout the world.
You may improve, modify, and create derivative works of the data or any portion of the data, and you may copy and distribute such modifications or works. Modified works should carry a notice stating that you changed the data and should note the date and nature of any such change. Please explicitly acknowledge the National Institute of Standards and Technology as the source of the data:  Data citation recommendations are provided at https://www.nist.gov/open/license.
Permission to use this data is contingent upon your acceptance of the terms of this agreement and upon your providing appropriate acknowledgments of NIST’s creation of the data/work.

## General comment
This cradle-to-gate unit process dataset represents the 2018 market mix of 1 m2 of single-Si cells.
This unit process includes raw material acquisition and transport.

## Technology
This unit process is a market activity, representing the consumption mix of single-Si cells, and an estimation on the distance the wafer is transported.

## Geography
Frischknecht et al. (2020) included consumption mixes for the US and Europe. The Us consumption mix is made of US made cells, and of cells made in the Asia & Pacific region
IMPORTANT NOTE: Due to the purposes of the project in which this inventory was included in the Federal LCA Commons, and to the absence of Korean electricity, the material input to this market are US-made cells in both cases, not Korean. Updates are planned to add international grids in to represent consumption mixes more accurately. Transport represents the US consumption mix distances.

## Time period
Frischknecht et al. (2020) indicates this is the production mix for the (calendar) year 2018.

## Reference product
- Photovoltaic cell, single-Si; 2018 consumption mix, at wholesale: 1 m2

## Inputs from technosphere
All rows: data quality (5,1,1,1,1)
- Photovoltaic cell, single-Si; at plant [United States]: 0.0719 m2; normal sd 1.56
- Transport, combination truck, average fuel mix [United States]: 0.0235 t*km; normal sd 2.09
- Transport, ocean freighter, average fuel mix [United States]: 8.03 t*km; normal sd 2.09
- Photovoltaic cell, single-Si; at plant [South Korea]: 0.928 m2; normal sd 1.56
  Asia & Pacific
- Transport, train, diesel powered [United States]: 0.094 t*km; normal sd 2.09

## Inventory method
Attributional cradle-to-gate

## Modelling constants
Frischknecht et al (2020) assumed a truck transport of 50 km and an additional 200 km train transport.

## Completeness
Treatment of Missing Environmental Data
Frischknecht et al. (2020) offered no information on cutoff criteria or flows that might have not been considered. However, no direct emissions are expected in a market activity.
Treatment of Missing Technosphere Data
Frischknecht et al. (2020) offered no information on cutoff criteria or flows that might have not been considered. However, the Technosphere flows present are consistent with an intercontinental market activity.
Mass Balance
The mass balance for this process was not calculated.

## Data selection
The inventory present in Frischknecht et al. (2020) Table 18 used here their own estimations (see Modeling constants above). No source is given there for the market share.

## Data treatment
The values in the LCI in Frischknecht et al. (2020) reflect the expert judgement of the authors, since there is no suggestion of a weighted average from different sources/reports.
Process data quality
Based on the information included in the “Data completeness section”, the data quality characteristic (DQC) "Process completeness" was given a score of 1 (>80 % of determined flow have been evaluated and given a value). It is likely the original report went through a review process, but because it is not explicitly mentioned, the data quality characteristic "Process review" was left as default (No documented review) and thus with a score of 5.

## Data collection
The transport was specifically estimated for Frischknecht et al. (2020) report, but although no sources are given, the inventory is said to represent production for the calendar year 2018, so data collection period must have taken place at some point after that.

## Sampling procedure
System boundary conditions
The system boundary is cradle to gate and includes although as a market activity, it only includes material use and transport.
Data collection
The inventory present in Frischknecht et al. (2020) Table 18 seems to be based solely on the expert knowledge of the authors of that report.
Uncertainty
Frischknecht et al. (2020) included a standard deviation for all flows, which is repeated here.

## Sources
- Frischknecht et al. (2020) LCI PV
