# Single-Si panel; slanted-roof installation; on roof, 10 kWp

Dataset: openLCA process, unit process
Category: 23: Construction/2382: Building Equipment Contractors
Geography: Switzerland
Time period: 2020-04-05 to 2020-04-30
Data quality: US EPA - Process Pedigree Matrix (5;1)
Exchange data quality scheme: US EPA - Flow Pedigree Matrix
Generated by: Gonzalo Rodriguez-Garcia
Owner: National Institute of Standards and Technology
isCopyrightProtected: false
restrictionsDescription: "This data/work was created by employees of the National Institute of Standards and Technology (NIST), an agency of the Federal Government. Pursuant to title 17 United States Code Section 105, works of NIST employees are not subject to copyright protection in the United States.  This data/work may be subject to foreign copyright.
The data/work is provided by NIST as a public service and is expressly provided “AS IS.” NIST MAKES NO WARRANTY OF ANY KIND, EXPRESS, IMPLIED OR STATUTORY, INCLUDING, WITHOUT LIMITATION, THE IMPLIED WARRANTY OF MERCHANTABILITY, FITNESS FOR A PARTICULAR PURPOSE, NON-INFRINGEMENT AND DATA ACCURACY. NIST does not warrant or make any representations regarding the use of the data or the results thereof, including but not limited to the correctness, accuracy, reliability or usefulness of the data. NIST SHALL NOT BE LIABLE AND YOU HEREBY RELEASE NIST FROM LIABILITY FOR ANY INDIRECT, CONSEQUENTIAL, SPECIAL, OR INCIDENTAL DAMAGES (INCLUDING DAMAGES FOR LOSS OF BUSINESS PROFITS, BUSINESS INTERRUPTION, LOSS OF BUSINESS INFORMATION, AND THE LIKE), WHETHER ARISING IN TORT, CONTRACT, OR OTHERWISE, ARISING FROM OR RELATING TO THE DATA (OR THE USE OF OR INABILITY TO USE THIS DATA), EVEN IF NIST HAS BEEN ADVISED OF THE POSSIBILITY OF SUCH DAMAGES.
To the extent that NIST may hold copyright in countries other than the United States, you are hereby granted the non-exclusive irrevocable and unconditional right to print, publish, prepare derivative works and distribute the NIST data, in any medium, or authorize others to do so on your behalf, on a royalty-free basis throughout the world.
You may improve, modify, and create derivative works of the data or any portion of the data, and you may copy and distribute such modifications or works. Modified works should carry a notice stating that you changed the data and should note the date and nature of any such change. Please explicitly acknowledge the National Institute of Standards and Technology as the source of the data:  Data citation recommendations are provided at https://www.nist.gov/open/license.
Permission to use this data is contingent upon your acceptance of the terms of this agreement and upon your providing appropriate acknowledgments of NIST’s creation of the data/work."

## General comment
This cradle-to-gate unit process dataset is for the production of 1 unit of 10 kWP slanted-roof mounted single-Si panel system.
This unit process includes raw material acquisition; manufacturing; transport; production and use of electricity.

## Technology
This process in representative of the installation of a residential photovoltaic system in Switzerland for 2020. It includes panels, inverter, electric installation and roof mounting installation, as well as the transportation of these inputs, and the electricity required for their installation.

## Geography
The processes modeled in Krebs et al. (2020) are for a residential photovoltaic system in Switzerland.

## Time period
The period spans from the publication date of the latest study used in Krebs et al. (2020) to their publication date, which is used as the "valid until" date, and of which only the month is known. Note that this leaves a validity period of less than a month.

## Reference product
- Photovoltaic panel, single-Si; slanted-roof installation; on roof; 10 kWp: 1 Item(s)

## Inputs from technosphere
- Inverter; at plant; 2.5 kW: 8 Item(s); normal sd 3.02; data quality (4,3,5,1,5)
- Transport, train, diesel powered: 471 t*km; normal sd 2.09; data quality (4,3,5,1,5)
- Photovoltaic plant; electric installation; at plant; 3 kWp: 3 Item(s); normal sd 3.08; data quality (4,1,5,1,5)
- Electricity, AC, 120 V: 0.133 kWh; normal sd 1.28; data quality (4,3,5,1,5); provider Electricity Bridge; Building Systems to US Electricity Baseline
- Slanted roof construction; mounted; on roof: 55.55 m2; normal sd 3.01; data quality (4,1,5,1,5)
- Transport, combination truck, average fuel mix: 119 t*km; normal sd 2.09; data quality (4,3,5,1,5)
- Photovoltaic panel, single-Si; 2018 consumption mix, at wholesale: 57.22 m2; normal sd 3.08; data quality (4,3,5,1,5)

## Emissions to nature
- Energy, heat [emission, air]: 0.48 MJ; normal sd 1.28; data quality (4,3,5,1,5)

## Inventory method
Attributional cradle-to-gate

## Modelling constants
Krebs et al. (2020) assumed a life time of 30 years, for the mounting system, electric installation, and the overall installation, and 15 years for the inverters, which thus need to be replaced once. A distance of 100 km by ban and 600 km by truck was also assumed.
A panel efficiency of 18 % for Single-Si was assumed, based on Frischknecht et al, (2020).

## Completeness
Treatment of Missing Environmental Data
Krebs et al. (2020) offered no information on cutoff criteria or flows that might have not been considered.

Treatment of Missing Technosphere Data
Krebs et al. (2020) offered no information on cutoff criteria or flows that might have not been considered.

Mass Balance
No mass balance was calculated for this process.

## Data selection
This unit process was modeled based on Krebs et al. (2020) inventory for a slanted-roof mounted 10 kWP multi-Si residential photovoltaic system available on Table 3.2 of said report.

## Data treatment
The values in the LCI in Krebs et al. (2020) reflect the expert judgement of the authors, since they do not seem a weighted average of the different studies.
Process data quality
Based on the information included in the “Data completeness section”, the data quality characteristic (DQC) "Process completeness""was given a score of 2 (60-79 % of determined flow have been evaluated and given a value). It is likely the original report went through a review process, but because it is not explicitly mentioned, the data quality characteristic "Process review" was left as default (No documented review) and thus with a score of 5."

## Data collection
The processes in Krebs et al. (2020) do not represent a real world residential system, but a modeled one. As such, there is no real collection period, and, as indicated in the Time description, the latest reference used in that report was published the same month as Krebs et al. (2020)

## Sampling procedure
System boundaries
The system boundary is cradle to gate and includes direct emissions, material and energy use, and transport.

Data collection
The data that made Krebs et al. (2020) LCI is based on previous reports. See the original source for details.

Uncertainty
Krebs et al. (2020) included a standard deviation for all flows, which is repeated here."

## Intended application
Situation C2 - Accounting, without system-external interactions - The intended application is a purely descriptive accounting / documentation of the analyzed system excluding interactions with other systems in the LCI model.
The target audience of this model are LCA practitioners, the silicon, solar and related industries and the general public. The inventory is considered largely complete, except for land transformation activities. For that reason, it is not recommended to use this dataset when evaluating land use impact categories. The results of the National Institute of Standards and Technology’s data gap analysis were analyzed using the ISO 21930-LCIA-US impact assessment methodology, as well as Cumulative Energy Demand and a subset of ReCiPe 2016 impact categories.
The original application of this dataset was the identification of data gaps in the Federal LCA Commons (FLCAC) (see ""Project"" above). However, the intended application is to provide a cradle-to-gate inventory (A1-A3, according to ISO 21930) using exclusively processes currently available in USLCI or generated as part of the project mentioned above, and elementary flows from the Federal Elementary Flow List (FEDEFL) to enable the use of a fuller range of LCIA impact categories than those reported in EPDs. For data quality purposes, the intended application is to provide a US average inventory for the year of publication of the original source.

## Project
This dataset was developed as part of the “Public Life Cycle Inventory Data Gap Analysis for Silicon-based Residential Photovoltaic Systems” National Institute of Standards and Technology’s Technical Note.

## Review Not reviewed
It is likely the original report went through a review process, but because it is not explicitly mentioned, the data quality characteristic "Process review" was left as default (No documented review) and thus with a score of 5".

## Sources
- Krebs et al. (2020) LCA residential PV
