# Silica sand Bridge; Building Systems to USEEIO

Dataset: openLCA process, unit process
Category: Bridge processes/Building Systems to USEEIO
Generated by: ERG
isCopyrightProtected: false

## General comment
Bridge process to transparently convert from physical units, in Building Systems, to values in 2012 producer price for connecting to background data in the USEEIO repository.
This is a copy of the equivalent bridge from USLCI to USEEIO.

## Reference product
- Silica sand, at plant: 1 kg

## Inputs from technosphere
- Sand, gravel, clay, phosphate, other nonmetallic minerals: 0.0276 USD

## Data treatment
Conversion to USD assumes a purchaser price of $60 per yd3. And a density (dry) of 1420 kg/m3. Purchaser prices are in 2024 dollars. The 2023 Rho matrix values (most recent available), which reflect CPI price year ratios, for the appropriate NAICS sector are used to convert current 2024 dollars to the model year (2012) of USEEIO version 2.0. Phi matrix values, which reflect producer-to-purchaser price ratios, for the appropriate NAICS sector are used to convert purchaser price data to producer prices to reflect the basis of USEEIO version 2.0.

2012 Producer Price = 2024 purchaser price * (2023 Rho/2012 Rho) * 2012 Phi

Utilized ratios - NAICS code: 212310/US, 2023 Rho: 0.742224524809564, 2012 Rho: 1.12912764859042, 2012 Phi: 0.760475189330741
