# Photovoltaic cell, multi-Si; at plant

Dataset: openLCA process, unit process
Category: 31-33: Manufacturing/3344: Semiconductor and Other Electronic Component Manufacturing
Geography: United States
Time period: 2020-01-02 to 2020-11-30
Data quality: US EPA - Process Pedigree Matrix (5;1)
Exchange data quality scheme: US EPA - Flow Pedigree Matrix
Generated by: Gonzalo Rodriguez-Garcia
Owner: National Institute of Standards and Technology
isCopyrightProtected: false
restrictionsDescription: This data/work was created by employees of the National Institute of Standards and Technology (NIST), an agency of the Federal Government. Pursuant to title 17 United States Code Section 105, works of NIST employees are not subject to copyright protection in the United States.  This data/work may be subject to foreign copyright.
The data/work is provided by NIST as a public service and is expressly provided “AS IS.” NIST MAKES NO WARRANTY OF ANY KIND, EXPRESS, IMPLIED OR STATUTORY, INCLUDING, WITHOUT LIMITATION, THE IMPLIED WARRANTY OF MERCHANTABILITY, FITNESS FOR A PARTICULAR PURPOSE, NON-INFRINGEMENT AND DATA ACCURACY. NIST does not warrant or make any representations regarding the use of the data or the results thereof, including but not limited to the correctness, accuracy, reliability or usefulness of the data. NIST SHALL NOT BE LIABLE AND YOU HEREBY RELEASE NIST FROM LIABILITY FOR ANY INDIRECT, CONSEQUENTIAL, SPECIAL, OR INCIDENTAL DAMAGES (INCLUDING DAMAGES FOR LOSS OF BUSINESS PROFITS, BUSINESS INTERRUPTION, LOSS OF BUSINESS INFORMATION, AND THE LIKE), WHETHER ARISING IN TORT, CONTRACT, OR OTHERWISE, ARISING FROM OR RELATING TO THE DATA (OR THE USE OF OR INABILITY TO USE THIS DATA), EVEN IF NIST HAS BEEN ADVISED OF THE POSSIBILITY OF SUCH DAMAGES.
To the extent that NIST may hold copyright in countries other than the United States, you are hereby granted the non-exclusive irrevocable and unconditional right to print, publish, prepare derivative works and distribute the NIST data, in any medium, or authorize others to do so on your behalf, on a royalty-free basis throughout the world.
You may improve, modify, and create derivative works of the data or any portion of the data, and you may copy and distribute such modifications or works. Modified works should carry a notice stating that you changed the data and should note the date and nature of any such change. Please explicitly acknowledge the National Institute of Standards and Technology as the source of the data:  Data citation recommendations are provided at https://www.nist.gov/open/license.
Permission to use this data is contingent upon your acceptance of the terms of this agreement and upon your providing appropriate acknowledgments of NIST’s creation of the data/work.

## General comment
This cradle-to-gate unit process dataset is for the production of 1 m2 of multi crystalline silicon cells.
This unit process includes raw material acquisition; production; transport; production and use of fuels, and electricity; disposal of process waste; ancillary materials manufacturing; manufacture, and installation of capital equipment.

## Technology
According to Woodhouse et al. (2019) the production of multi-crystalline silicon cells consists of six steps:
“1. Wafer saw damage removal and surface texturization by a wet chemical process.
2. High-temperature diffusion of gaseous POCl3 into the wafer’s front surface.
3. Wet chemical etching of the phosphosilicate glass (PSG) layer that forms after the POCl3 is driven into the wafer and the wafer cools.
4. Deposition of a hydrogenated silicon nitride (SiNx:H) anti-reflection and surface passivation layer on top of the phosphorous-doped frontside.
5. Screen-printing aluminum (Al) and silver (I) pastes on the front and back.
6. Annealing and paste cofiring.”

## Geography
Frischknecht et al. (2020) is based on de Wild-Scholten (2014), and Woodhouse et al (2019). The latter did not specify the location from where their data was gathered, but the former indicated that at least several data point refer to a German plant.

## Time period
The period spans from the publication date of the latest study cited by Frischknecht et al. (2020) and the date of the publication of their report.

## Reference product
- Photovoltaic cell, multi-Si; at plant [United States]: 1 m2

## Inputs from technosphere
- Solvent, at plant [United States]: 0.0113 m3; normal sd 1.22; data quality (2,4,5,1,5)
- Hydrogen fluoride, at plant [United States]: 0.403 kg; normal sd 1.22; data quality (2,4,5,1,5); provider Hydrogen Fluoride Bridge; Building Systems to USEEIO
- Transport, train, diesel powered [United States]: 0.394 t*km; normal sd 2.09; data quality (4,5,5,1,5)
- Metallization plaste; back side, aluminum; at plant [United States]: 0.0554 kg; normal sd 1.09; data quality (2,1,5,1,5)
- Electricity, AC, 120 V [United States]: 17.7 kWh; normal sd 1.09; data quality (2,1,5,1,5); provider Electricity Bridge; Building Systems to US Electricity Baseline
- Residual fuel oil, combusted in industrial boiler [United States]: 0.0027 MJ; normal sd 1.22; data quality (2,4,5,1,5)
- Nitrogen, liquid, at plant [United States]: 1.35 kg; normal sd 1.22; data quality (2,4,5,1,5)
- Oxygen, liquid, at plant [United States]: 0.00822 kg; normal sd 1.22; data quality (2,4,5,1,5)
- Tetrafluoroethane (R-134a) [United States]: 2.73e-5 kg; normal sd 1.22; data quality (2,4,5,1,5)
- Metallization plaste; back side; at plant [United States]: 0.00111 kg; normal sd 1.09; data quality (2,1,5,1,5)
- Phosphoric Acid, at plant [United States]: 0.00863 kg; normal sd 1.22; data quality (2,4,5,1,5)
- Transport, combination truck, average fuel mix [United States]: 0.522 t*km; normal sd 2.09; data quality (4,5,5,1,5)
- Photovoltaic cell factory [United States]: 4e-7 Item(s); normal sd 3.05; data quality (2,4,5,1,5)
- Sodium hydroxide, production mix, at plant [United States]: 0.0707 kg; normal sd 1.22; data quality (2,4,5,1,5)
- Ammonium sulfate, at plant [United States]: 0.021 kg; normal sd 1.22; data quality (2,4,5,1,5)
- Calcium chloride; at plant [United States]: 0.0315 kg; normal sd 1.22; data quality (2,4,5,1,5)
- Hydrochloric acid, without water, in 30% solution state, at plant [United States]: 0.00859 kg; normal sd 1.22; data quality (2,4,5,1,5)
- Natural gas, combusted in industrial boiler [United States]: 0.247 MJ; normal sd 1.22; data quality (2,4,5,1,5)
- Multi-Si wafer; photovoltaics; 2018 consumption mix, at wholesale [United States]: 1.04 m2; normal sd 3.01; data quality (2,2,5,1,5)
- Ammonia, steam reforming, liquid, at plant [United States]: 0.00892 kg; normal sd 1.22; data quality (2,4,5,1,5)
- Phosphoryl chloride; at plant [United States]: 0.0274 kg; normal sd 1.22; data quality (2,4,5,1,5)
- Metallization plaste; front side; at plant [United States]: 0.00337 kg; normal sd 1.09; data quality (2,1,5,1,5)
- Nitric acid, at plant [United States]: 0.293 kg; normal sd 1.22; data quality (2,4,5,1,5)
- Sulfuric acid, at plant [United States]: 0.101 kg; normal sd 1.22; data quality (2,4,5,1,5)
- Potassium hydroxide; at plant [United States]: 0.03 kg; normal sd 1.22; data quality (2,4,5,1,5)
- Hydrated lime; at plant [United States]: 0.218 kg; normal sd 1.22; data quality (2,4,5,1,5)
- Hydrogen peroxide, at plant [United States]: 0.000452 kg; normal sd 1.22; data quality (2,4,5,1,5)
- Isopropanol; at plant [United States]: 0.00081 kg; normal sd 1.22; data quality (2,4,5,1,5)
- Silane; at plant [United States]: 0.00261 kg; normal sd 1.22; data quality (2,4,5,1,5)
- Drinking water treatment; U.S. Average Treatment [United States]: 251 l; normal sd 1.22; data quality (2,4,5,1,5)

## Waste to treatment
- Disposal, waste, to inert landfill [United States]: 2.74 kg; normal sd 1.22; data quality (2,1,5,1,5); provider Disposal, waste, to inert landfill Bridge; Building Systems to USEEIO
  disposal, waste, Si waferprod., inorg, 9.4% water, to residual material landfill
- Spent solvent, unspecified treatment; at treatment plant [United States]: 0.0108 kg; normal sd 1.22; data quality (2,1,5,1,5)
- Wastewater treatment level 1; Conventional plug flow activated sludge aggregate, solids reduction; at plant [United States]: 0.226 m3; normal sd 1.63; data quality (2, 1, 5, 1, 5)
  Proxy. Frischknecht et al. (2020) mentions "treatment, PV cell production effluent, to wastewater treatment, class 3"

## Emissions to nature
All rows: data quality (2,4,5,1,5)
- Hydrofluoric acid [emission, air]: 0.00069 kg; normal sd 1.57
- Silver [emission, air]: 7.73e-6 kg; normal sd 5.06
- Ammonia [emission, air]: 0.000522 kg; normal sd 1.31
- Volatile organic compounds [emission, air]: 0.000353 kg; normal sd 1.57
- Acetaldehyde [emission, air]: 0 kg
- Nitrogen oxides [emission, air]: 0.0124, 0.00364 kg (2 entries); normal sd 1.57
- Carbon dioxide [emission, air]: 0.682 kg; normal sd 1.22
- Silicon [emission, air]: 3.17e-8, 6e-6, 0.000147 kg (3 entries); normal sd 5.06
- Water, fresh [emission, air]: 25.1 kg; normal sd 1.63
- Energy, heat [emission, air]: 51.8 MJ; normal sd 1.22
- Nitric acid [emission, air]: 0.000119 kg; normal sd 1.57
- Hydrogen [emission, air]: 0.000444 kg; normal sd 1.57
- Aluminum [emission, air]: 7.73e-6 kg; normal sd 5.06
- Tin [emission, air]: 7.73e-6 kg; normal sd 5.06
- Chlorine [emission, air]: 0 kg
- Lead [emission, air]: 7.73e-6 kg; normal sd 5.06
- HFC-134a [emission, air]: 2.73e-5 kg; normal sd 1.57
- Isopropanol [emission, air]: 0 kg

## Inventory method
Attributional cradle-to-gate

## Modelling constants
Frischknecht et al. (2020) assumed heat losses were equal to the electricity used. This is not explicitly mentioned there but can be found in de Wild-Scholten (2014).
Frischknecht et al. (2020) assumed emissions of water to air are assumed to be 10% of process water.

## Completeness
Treatment of Missing Environmental Data
Frischknecht et al. (2015, 2020), and de Wild-Scholten (2014) offer no information on cutoff criteria or flows that might have not been considered.
Treatment of Missing Technosphere Data
Frischknecht et al. (2015, 2020), and de Wild-Scholten (2014) offer no information on cutoff criteria or flows that might have not been considered.
Mass Balance
The mass balance for this process was not calculated.

## Data selection
This unit process was modeled based on Frischknecht et al. (2020) inventory for multi crystalline silicon cells, available on Table 16 of said report. It is based on multiple sources, de Wild-Scholten (2014), Woodhouse et al. (2019) and VDMA (2020).

## Data treatment
The values in the LCI in Frischknecht et al. (2020) reflect the expert judgement of the authors and of the sources they cite, since none suggest a weighted average from different sources/reports.
Process data quality
Based on the information included in the “Data completeness section”, the data quality characteristic (DQC) "Process completeness" was given a score of 1 (>80 % of determined flow have been evaluated and given a value). It is likely the original report went through a review process, but because it is not explicitly mentioned, the data quality characteristic "Process review" was left as default (No documented review) and thus with a score of 5.

## Data collection
Data to build this inventory ranges at least from the calendar year 2006 (some data nominally from de Wild-Scholten (2014) is from de Wild Scholten and Alsema (2007), whose data is from 2006 at the earliest) to 2018 (electricity use and metallization paste, based on Woodhouse et al., 2019)

## Sampling procedure
System boundary conditions
The system boundary is cradle to gate and includes direct emissions, material and energy use, waste treatment, transport, and infrastructure.
Data collection
The data that made Frischknecht et al. (2020) LCI is based on previous reports. See “data selection” above and the original source for details.
Uncertainty
Frischknecht et al. (2020) included a standard deviation for all flows, which is repeated here.

## Intended application
Situation C2 - Accounting, without system-external interactions - The intended application is a purely descriptive accounting / documentation of the analyzed system excluding interactions with other systems in the LCI model.
The target audience of this model are LCA practitioners, the silicon, solar and related industries and the general public. The inventory is considered largely complete, except for land transformation activities. For that reason, it is not recommended to use this dataset when evaluating land use impact categories. The results of the National Institute of Standards and Technology’s data gap analysis were analyzed using the ISO 21930-LCIA-US impact assessment methodology, as well as Cumulative Energy Demand and a subset of ReCiPe 2016 impact categories.
The original application of this dataset was the identification of data gaps in the Federal LCA Commons (FLCAC) (see "Project" above). However, the intended application is to provide a cradle-to-gate inventory (A1-A3, according to ISO 21930) using exclusively processes currently available in USLCI or generated as part of the project mentioned above, and elementary flows from the Federal Elementary Flow List (FEDEFL) to enable the use of a fuller range of LCIA impact categories than those reported in EPDs. For data quality purposes, the intended application is to provide a US average inventory for the year of publication of the original source.

## Project
This dataset was developed as part of the “Public Life Cycle Inventory Data Gap Analysis for Silicon-based Photovoltaic panels” National Institute of Standards and Technology’s Technical Note.

## Sources
- Frischknecht et al. (2020) LCI PV
- Woodhouse et al. (2019) Cost Si PV
- de Wild-Schloten (2014) LCI PV
- de Wild-Scholten and Alsema (2007) LCI PV
- Frischknecht et al. (2015) LCI PV
