# Photovoltaic plant; electric installation; at plant; 3 kWp

Dataset: openLCA process, unit process
Category: 23: Construction/2382: Building Equipment Contractors
Geography: Switzerland
Time period: 2006-12-31 to 2020-11-30
Data quality: US EPA - Process Pedigree Matrix (5;1)
Exchange data quality scheme: US EPA - Flow Pedigree Matrix
Generated by: Gonzalo Rodriguez-Garcia
Owner: National Institute of Standards and Technology
isCopyrightProtected: false
restrictionsDescription: This data/work was created by employees of the National Institute of Standards and Technology (NIST), an agency of the Federal Government. Pursuant to title 17 United States Code Section 105, works of NIST employees are not subject to copyright protection in the United States.  This data/work may be subject to foreign copyright.
The data/work is provided by NIST as a public service and is expressly provided “AS IS.” NIST MAKES NO WARRANTY OF ANY KIND, EXPRESS, IMPLIED OR STATUTORY, INCLUDING, WITHOUT LIMITATION, THE IMPLIED WARRANTY OF MERCHANTABILITY, FITNESS FOR A PARTICULAR PURPOSE, NON-INFRINGEMENT AND DATA ACCURACY. NIST does not warrant or make any representations regarding the use of the data or the results thereof, including but not limited to the correctness, accuracy, reliability or usefulness of the data. NIST SHALL NOT BE LIABLE AND YOU HEREBY RELEASE NIST FROM LIABILITY FOR ANY INDIRECT, CONSEQUENTIAL, SPECIAL, OR INCIDENTAL DAMAGES (INCLUDING DAMAGES FOR LOSS OF BUSINESS PROFITS, BUSINESS INTERRUPTION, LOSS OF BUSINESS INFORMATION, AND THE LIKE), WHETHER ARISING IN TORT, CONTRACT, OR OTHERWISE, ARISING FROM OR RELATING TO THE DATA (OR THE USE OF OR INABILITY TO USE THIS DATA), EVEN IF NIST HAS BEEN ADVISED OF THE POSSIBILITY OF SUCH DAMAGES.
To the extent that NIST may hold copyright in countries other than the United States, you are hereby granted the non-exclusive irrevocable and unconditional right to print, publish, prepare derivative works and distribute the NIST data, in any medium, or authorize others to do so on your behalf, on a royalty-free basis throughout the world.
You may improve, modify, and create derivative works of the data or any portion of the data, and you may copy and distribute such modifications or works. Modified works should carry a notice stating that you changed the data and should note the date and nature of any such change. Please explicitly acknowledge the National Institute of Standards and Technology as the source of the data:  Data citation recommendations are provided at https://www.nist.gov/open/license.
Permission to use this data is contingent upon your acceptance of the terms of this agreement and upon your providing appropriate acknowledgments of NIST’s creation of the data/work."

## General comment
This cradle-to-gate unit process dataset is for the production of 1 unit of electric installation for a 3 kWP solar plant.
This unit process includes raw material acquisition; manufacturing; transport; disposal of process waste; ancillary materials manufacturing.

## Technology
This process represent the manufacturing of electric installations for photovoltaic systems using average technology for Europe from the calendar years 1991-2006.
It includes all installation between panel and grid, minus the inverter. It contains a fuse box, and cables. These connect panel frames and mounting structure to the lighting arrester, panels to the inverter, and the inverter to the electric meter.

## Geography
Assumed, since a large fraction of the data used for the inventory in Jungbluth et al. (2012) comes from Swiss publications.

## Time period
The period spans from the publication date of the latest study used in Jungbluth et al. (2012) to the publication date of Frischknecht et al. (2020), since the model has remained valid throughout this period.

## Reference product
- Photovoltaic plant; electric installation; at plant; 3 kWp: 1 Item(s)

## Inputs from technosphere
- Nylon 6, at plant: 0.23 kg; normal sd 1.24; data quality (2,3,5,1,5); provider Nylon 6 Bridge; Building Systems to USEEIO
- Brass; at plant: 0.02 kg; normal sd 1.24; data quality (2,3,5,1,5)
- Polyvinyl chloride resin, suspension grade PVC; at plant [RNA]: 2.13 kg; normal sd 1.24; data quality (2,3,5,2,5)
- Transport, train, diesel powered: 13.4 t*km; normal sd 2.09; data quality (4, 5, 5, 1, 5)
- Zinc; refined, primary; at plant: 0.04 kg; normal sd 1.24; data quality (2,3,5,1,5)
- Polyethylene, high density, HDPE, virgin resin, at plant: 17.6 kg; normal sd 1.24; data quality (2,3,5,2,5)
- Copper wire drawing; at plant: 14.7 kg; normal sd 1.24; data quality (5,3,5,1,5)
- Copper, at regional storage: 14.7 kg; normal sd 1.24; data quality (5,3,5,1,5)
- Epoxy, at plant: 0.002 kg; normal sd 1.24; data quality (2,3,5,1,5)
  Resin
- Low-alloyed steel; at plant: 0.86 kg; normal sd 1.24; data quality (2,3,5,1,5); provider Low-alloyed steel Bridge; Building Systems to USLCI
- Transport, combination truck, average fuel mix: 2.15 t*km; normal sd 2.09; data quality (4,5,5,1,5)
- Polycarbonate, at plant: 0.2 kg; normal sd 1.24; data quality (2,3,5,1,5); provider Polycarbonate Bridge; Building Systems to USEEIO

## Waste to treatment
- Waste electric wiring; unspeficied treatment; at treatment plant: 0.06 kg; normal sd 1.24; data quality (2,3,5,1,5)
  disposal, building, electric wiring, to final disposa
- Disposal, plastic waste, unspecified: 20.2 kg; normal sd 1.24; data quality (2,3,5,1,5)
  disposal, plastic, industr. electronics, 15.3% water, to municipal incineration

## Inventory method
Attributional cradle-to-gate.

## Modelling constants
Jungbluth et al. (2012) assumed a standard distance of 60 km is assumed for truck transport, 600 km for train transport of metals, and 200 km for train transport of other materials.

## Completeness
Treatment of Missing Environmental Data
Jungbluth et al. (2012) offered no information on cutoff criteria or flows that might have not been considered.

Treatment of Missing Technosphere Data
Jungbluth et al. (2012) offered no information on cutoff criteria or flows that might have not been considered.

Mass Balance
No mass balance was calculated for this process.

## Data selection
This unit process was modeled based on Jungbluth et al. (2012) inventory for an electric installation for a 3 kWP plant available on Table 11.30 of said report.

## Data treatment
The values in the LCI in Jungbluth et al, (2012) reflect the expert judgement of the authors, since they do not seem a weighted average of the different studies.

Process data quality
Based on the information included in the “Data completeness section”, the data quality characteristic (DQC) ""Process completeness"" was given a score of 2 (60-79 % of determined flow have been evaluated and given a value). It is likely the original report went through a review process, but because it is not explicitly mentioned, the data quality characteristic ""Process review"" was left as default (No documented review) and thus with a score of 5.

## Data collection
Between calendar years 1991 and 2006, both included, based on the studies cited in Jungbluth et al. (2012)

## Sampling procedure
System boundaries
The system boundary is cradle to gate and includes material use, waste treatment, and transport.

Data collection
The data that made Jungbluth et al. (2012) LCI is based on previous reports. See the original source for details.

Uncertainty
Jungbluth et al. (2020) included a standard deviation for all flows, which is repeated here.

## Intended application
Situation C2 - Accounting, without system-external interactions - The intended application is a purely descriptive accounting / documentation of the analyzed system excluding interactions with other systems in the LCI model.
The target audience of this model are LCA practitioners, the silicon, solar and related industries and the general public. The inventory is considered largely complete, except for land transformation activities. For that reason, it is not recommended to use this dataset when evaluating land use impact categories. The results of the National Institute of Standards and Technology’s data gap analysis were analyzed using the ISO 21930-LCIA-US impact assessment methodology, as well as Cumulative Energy Demand and a subset of ReCiPe 2016 impact categories.
The original application of this dataset was the identification of data gaps in the Federal LCA Commons (FLCAC) (see ""Project"" above). However, the intended application is to provide a cradle-to-gate inventory (A1-A3, according to ISO 21930) using exclusively processes currently available in USLCI or generated as part of the project mentioned above, and elementary flows from the Federal Elementary Flow List (FEDEFL) to enable the use of a fuller range of LCIA impact categories than those reported in EPDs. For data quality purposes, the intended application is to provide a US average inventory for the year of publication of the original source.

## Project
This dataset was developed as part of the “Public Life Cycle Inventory Data Gap Analysis for Silicon-based Residential Photovoltaic Systems” National Institute of Standards and Technology’s Technical Note.

## Review Independent external review
Colleagues at the Paul Scherrer Institute are acknowledged for their revision of data, but no other details on their review are available. Because it is not properly documented, the "Process review" data quality entry is left as "5: Not documented".

## Review Dependent internal review
Colleagues at ESU-services Ldt. are acknowledged for their revision of data, but no other details on their review are available. Because it is not properly documented, the "Process review" data quality entry is left as "5: Not documented".

## Sources
- Jungbluth et al. (2012) LCI PV
- Frischknecht et al. (2020) LCI PV
