# Polyurethane Bridge; Building Systems to USEEIO

Dataset: openLCA process, unit process
Category: Bridge processes/Building Systems to USEEIO
Generated by: ERG
isCopyrightProtected: false

## General comment
Bridge process to transparently convert from physical units, in Building System, to values in 2012 producer price for connecting to background data in the USEEIO repository.
This is a copy of Polymers Bridge, USLCI to USEEIO, although with a different output.

## Reference product
- Polyurethane, flexible foam, at plant: 1 kg

## Inputs from technosphere
- Other basic organic chemicals: 1.49 USD

## Data treatment
Conversion to USD assumes purchaser price of $2410 per metric ton. Purchaser prices are in 2024 dollars. The 2023 Rho matrix values (most recent available), which reflect CPI price year ratios, for the appropriate NAICS sector are used to convert current 2024 dollars to the model year (2012) of USEEIO version 2.0. Phi matrix values, which reflect producer-to-purchaser price ratios, for the appropriate NAICS sector are used to convert purchaser price data to producer prices to reflect the basis of USEEIO version 2.0.

2012 Producer Price = 2024 purchaser price * (2023 Rho/2012 Rho) * 2012 Phi

Utilized ratios - NAICS code: 325180/US, 2023 Rho: 0.688687870994436, 2012 Rho: 0.948450590089206, 2012 Phi: 0.851483185426767
