# Silicon; single crystalline, Czochralski process; at plant

Dataset: openLCA process, unit process
Category: 31-33: Manufacturing/3279: Other Nonmetallic Mineral Product Manufacturing
Geography: United States
Time period: 2020-01-04 to 2020-11-30
Data quality: US EPA - Process Pedigree Matrix (5;1)
Exchange data quality scheme: US EPA - Flow Pedigree Matrix
Generated by: Gonzalo Rodriguez-Garcia
Owner: National Institute of Standards and Technology
isCopyrightProtected: false
restrictionsDescription: This data/work was created by employees of the National Institute of Standards and Technology (NIST), an agency of the Federal Government. Pursuant to title 17 United States Code Section 105, works of NIST employees are not subject to copyright protection in the United States.  This data/work may be subject to foreign copyright.
The data/work is provided by NIST as a public service and is expressly provided “AS IS.” NIST MAKES NO WARRANTY OF ANY KIND, EXPRESS, IMPLIED OR STATUTORY, INCLUDING, WITHOUT LIMITATION, THE IMPLIED WARRANTY OF MERCHANTABILITY, FITNESS FOR A PARTICULAR PURPOSE, NON-INFRINGEMENT AND DATA ACCURACY. NIST does not warrant or make any representations regarding the use of the data or the results thereof, including but not limited to the correctness, accuracy, reliability or usefulness of the data. NIST SHALL NOT BE LIABLE AND YOU HEREBY RELEASE NIST FROM LIABILITY FOR ANY INDIRECT, CONSEQUENTIAL, SPECIAL, OR INCIDENTAL DAMAGES (INCLUDING DAMAGES FOR LOSS OF BUSINESS PROFITS, BUSINESS INTERRUPTION, LOSS OF BUSINESS INFORMATION, AND THE LIKE), WHETHER ARISING IN TORT, CONTRACT, OR OTHERWISE, ARISING FROM OR RELATING TO THE DATA (OR THE USE OF OR INABILITY TO USE THIS DATA), EVEN IF NIST HAS BEEN ADVISED OF THE POSSIBILITY OF SUCH DAMAGES.
To the extent that NIST may hold copyright in countries other than the United States, you are hereby granted the non-exclusive irrevocable and unconditional right to print, publish, prepare derivative works and distribute the NIST data, in any medium, or authorize others to do so on your behalf, on a royalty-free basis throughout the world.
You may improve, modify, and create derivative works of the data or any portion of the data, and you may copy and distribute such modifications or works. Modified works should carry a notice stating that you changed the data and should note the date and nature of any such change. Please explicitly acknowledge the National Institute of Standards and Technology as the source of the data:  Data citation recommendations are provided at https://www.nist.gov/open/license.
Permission to use this data is contingent upon your acceptance of the terms of this agreement and upon your providing appropriate acknowledgments of NIST’s creation of the data/work.

## General comment
This cradle-to-gate unit process dataset is for the production of 1 kg of single crystalline silicon.
This unit process includes raw material acquisition; production; transport; production and use of fuels, and electricity; disposal of process waste; ancillary materials manufacturing; manufacture, and installation of capital equipment.

## Technology
According to Hagedorn and & Hellriegler (1992), cited in Jungbluth et al. (2012) “… silicon parts are broken down to a size of 0.1 to 7.5 cm. In an acid bath with nitric acid, hydrogen fluoride and acetic acid the surface is purified and SiO2 is removed […] The cleaned silicon parts are melted in a crucible and a seed crystal is first dipped into the melt. Then the seed is slowly withdrawn vertically to the melt surface whereby the liquid crystallizes at the seed. The pulling is done under argon inert gas stream.”

## Geography
Frischknecht et al. (2020) is mostly based on Frischknecht et al. (2015). Although the authors of these reports consider the data to be representative of production in the US, data comes from several locations, some undisclosed, some in Germany (see de Wild-Scholten, 2014, for an example)

## Time period
The period spans from the publication date of the latest study cited by Frischknecht et al. (2020) and the date of the publication of their report.

## Reference product
- Silicon; single crystalline, Czochralski process; at plant [United States]: 1 kg

## Inputs from technosphere
- Ceramic tiles, at regional storage [United States]: 0.167 kg; normal sd 1.32; data quality (1,3,5,1,5); provider Ceramic tiles Bridge; Building Systems to USEEIO
- Electricity, AC, 120 V [United States]: 32 kWh; normal sd 1.22; data quality (2,1,5,1,5); provider Electricity Bridge; Building Systems to US Electricity Baseline
- Argon, liquid, at plant [United States]: 1 kg; normal sd 1.32; data quality (2,4,5,1,5); provider Argon, liquid Bridge; Building Systems to USEEIO
- Natural gas, combusted in industrial boiler [United States]: 68.2 MJ; normal sd 1.32; data quality (1,4,5,1,5)
- Silicon, solar grade; 2018 production mix, at wholesale [United States]: 1 kg; normal sd 1.33; data quality (2,1,5,1,5)
- Sodium hydroxide, production mix, at plant [United States]: 0.0415 kg; normal sd 1.65; data quality (4,5,5,1,5)
- Nitric acid, at plant [United States]: 0.0668 kg; normal sd 1.65; data quality (4,3,5,1,5)
- Water, process, deionized [United States]: 4.01 kg; normal sd 1.32; data quality (1,4,5,1,5)
- Hydrated lime; at plant [United States]: 0.0222 kg; normal sd 1.65; data quality (4,5,5,1,5)
- Silicon factory [United States]: 1e-11 Item(s); normal sd 3.09; data quality (4,4,5,1,5)
- Transport, train, diesel powered [United States]: 1.41 t*km; normal sd 2.09; data quality (4,3,5,1,5)
- Hydrogen fluoride, at plant [United States]: 0.01 kg; normal sd 1.65; data quality (4,3,5,1,5); provider Hydrogen Fluoride Bridge; Building Systems to USEEIO
- Transport, combination truck, average fuel mix [United States]: 1.13 t*km; normal sd 2.09; data quality (4,1,5,1,5)
- Drinking water treatment; U.S. Average Treatment [United States]: 5.09 m3; normal sd 1.32; data quality (1,3,5,1,5)
  Cooling water

## Waste to treatment
- Disposal, non-hazardous waste, to landfill [United States]: 0.167 kg; normal sd 1.32; data quality (1,3,5,1,5)
  disposal, waste, Si waferprod., inorg, 9.4% water, to residual material landfill
- Wastewater treatment level 1; Conventional plug flow activated sludge aggregate, solids reduction; at plant [United States]: 4.84 m3; normal sd 1.63; data quality (4,1,5,1,5)
  Proxy. Frischknecht et al. (2020) mentions "To wastewater treamtent plant, class 2"

## Emissions to nature
- Total Organic Carbon [emission, water]: 0 kg; data quality (5,1,5,1,5)
  4.05E-2 kg, removed to avoid double counting with BOD
- Hydroxide [emission, water]: 0.00442 kg; normal sd 3.3; data quality (4,3,5,1,5)
- Nitrogen oxides [emission, air]: 0.0339 kg; normal sd 1.85; data quality (4,5,5,1,5)
- Dissolved Organic Carbon [emission, water]: 0 kg; data quality (5,1,5,1,5)
  4.05E-2 kg, removed to avoid double counting with BOD
- Chemical Oxygen Demand [emission, water]: 0 kg; normal sd 3.33; data quality (5,1,5,1,5)
  1.30E-1 kg, removed to avoid double counting with COD
- Nitrate [emission, water]: 0.0835 kg; normal sd 1.85; data quality (4,5,5,1,5)
- Energy, heat [emission, air]: 115 MJ; normal sd 1.58; data quality (4,3,5,1,5)
- Biological Oxygen Demand [emission, water]: 0.13 kg; data quality (5,1,5,1,5)
- Water, fresh [emission, air]: 255 kg; normal sd 1.88; data quality (4,3,5,1,5)

## Inventory method
Attributional cradle-to-gate

## Modelling constants
Frischknecht et al (2020) assumed a truck transport of 1000 km for the silicon, and 100 km for everything else. They also estimated a 100-year lifetime and a 1 Mt/year production for the factory. De Wild-Scholten (2014) assumed a standard distance for rail transport of 600 km.
Emissions of water to air are assumed to be 5% of cooling water and 10% of process water.
Chemical Oxygen Demand (COD), Biological Oxygen Demand (BOD), and Total Organic Carbon (TOC), are three ways of measuring effectively the same pollutant. To prevent triple counting, COD and TOC are set to zero, but the actual amounts are given in the description.

## Completeness
Frischknecht et al. (2015, 2020), and de Wild-Scholten (2014) offer no information on cutoff criteria or flows that might have not been considered.
Treatment of Missing Technosphere Data
Frischknecht et al. (2020) indicates that the material losses (1.5-2 %) are included in the wafer production model. No other information regarding cutoff criteria or flows that might have not been considered is included said report or in Frischknecht et al. (2015).
Mass Balance
The mass balance for this process was not calculated. See also “Treatment of Missing Technosphere Data” above.

## Data selection
This unit process was modeled based on Frischknecht et al. (2020) inventory for single crystalline silicon, available on Table 9 of said report. It is based on multiple sources, including a previous iteration of the same inventory (Frischknecht et al., 2015), which in turn was based on de Wild-Scholten (2014). Other sources include Hagedorn (1992) and VDMA (2020).

## Data treatment
The values in the LCI in Frischknecht et al. (2020) reflect the expert judgement of the authors and of the sources they cite, since none suggest a weighted average from different sources/reports.
Process data quality
Based on the information included in the “Data completeness section”, the data quality characteristic (DQC) "Process completeness" was given a score of 1 (>80 % of determined flow have been evaluated and given a value). It is likely the original report went through a review process, but because it is not explicitly mentioned, the data quality characteristic "Process review" was left as default (No documented review) and thus with a score of 5.

## Data collection
Data to build this inventory ranges at least from the calendar year 1992 (use of hydrated lime, based on Hagendorn, 1992) to 2019 (electricity use, based on VDMA, 2020)

## Sampling procedure
System boundary conditions
The system boundary is cradle to gate and includes direct emissions, material and energy use, waste treatment, transport, and infrastructure.
Data collection
The data that made Frischknecht et al. (2020) LCI is based on previous reports. See “data selection” above and the original source for details.
Uncertainty
Frischknecht et al. (2020) included a standard deviation for all flows, which is repeated here.

## Intended application
Situation C2 - Accounting, without system-external interactions - The intended application is a purely descriptive accounting / documentation of the analyzed system excluding interactions with other systems in the LCI model.
The target audience of this model are LCA practitioners, the silicon, solar and related industries and the general public. The inventory is considered largely complete, except for land transformation activities. For that reason, it is not recommended to use this dataset when evaluating land use impact categories. The results of the National Institute of Standards and Technology’s data gap analysis were analyzed using the ISO 21930-LCIA-US impact assessment methodology, as well as Cumulative Energy Demand and a subset of ReCiPe 2016 impact categories.
The original application of this dataset was the identification of data gaps in the Federal LCA Commons (FLCAC) (see "Project" above). However, the intended application is to provide a cradle-to-gate inventory (A1-A3, according to ISO 21930) using exclusively processes currently available in USLCI or generated as part of the project mentioned above, and elementary flows from the Federal Elementary Flow List (FEDEFL) to enable the use of a fuller range of LCIA impact categories than those reported in EPDs. For data quality purposes, the intended application is to provide a US average inventory for the year of publication of the original source.

## Project
This dataset was developed as part of the “Public Life Cycle Inventory Data Gap Analysis for Silicon-based Photovoltaic panels” National Institute of Standards and Technology’s Technical Note.

## Sources
- Frischknecht et al. (2015) LCI PV
- de Wild-Schloten (2014) LCI PV
- Frischknecht et al. (2020) LCI PV
- Hagedorn and Hellriegel (1992) Env. flows solar cells
- VDMA (2020) Roadmap PV
