# Electronics for control units; at plant

Dataset: openLCA process, unit process
Category: 31-33: Manufacturing/3345: Navigational, Measuring, Electromedical, and Control Instruments Manufacturing
Geography: Switzerland
Time period: 1990-01-01 to 2005-12-31
Allocation method: no allocation
Data quality: US EPA - Process Pedigree Matrix (5;1)
Exchange data quality scheme: US EPA - Flow Pedigree Matrix
Generated by: Gonzalo Rodriguez-Garcia
Owner: National Institute of Standards and Technology
isCopyrightProtected: false
restrictionsDescription: This data/work was created by employees of the National Institute of Standards and Technology (NIST), an agency of the Federal Government. Pursuant to title 17 United States Code Section 105, works of NIST employees are not subject to copyright protection in the United States.  This data/work may be subject to foreign copyright.
The data/work is provided by NIST as a public service and is expressly provided “AS IS.” NIST MAKES NO WARRANTY OF ANY KIND, EXPRESS, IMPLIED OR STATUTORY, INCLUDING, WITHOUT LIMITATION, THE IMPLIED WARRANTY OF MERCHANTABILITY, FITNESS FOR A PARTICULAR PURPOSE, NON-INFRINGEMENT AND DATA ACCURACY. NIST does not warrant or make any representations regarding the use of the data or the results thereof, including but not limited to the correctness, accuracy, reliability or usefulness of the data. NIST SHALL NOT BE LIABLE AND YOU HEREBY RELEASE NIST FROM LIABILITY FOR ANY INDIRECT, CONSEQUENTIAL, SPECIAL, OR INCIDENTAL DAMAGES (INCLUDING DAMAGES FOR LOSS OF BUSINESS PROFITS, BUSINESS INTERRUPTION, LOSS OF BUSINESS INFORMATION, AND THE LIKE), WHETHER ARISING IN TORT, CONTRACT, OR OTHERWISE, ARISING FROM OR RELATING TO THE DATA (OR THE USE OF OR INABILITY TO USE THIS DATA), EVEN IF NIST HAS BEEN ADVISED OF THE POSSIBILITY OF SUCH DAMAGES.
To the extent that NIST may hold copyright in countries other than the United States, you are hereby granted the non-exclusive irrevocable and unconditional right to print, publish, prepare derivative works and distribute the NIST data, in any medium, or authorize others to do so on your behalf, on a royalty-free basis throughout the world.
You may improve, modify, and create derivative works of the data or any portion of the data, and you may copy and distribute such modifications or works. Modified works should carry a notice stating that you changed the data and should note the date and nature of any such change. Please explicitly acknowledge the National Institute of Standards and Technology as the source of the data:  Data citation recommendations are provided at https://www.nist.gov/open/license.
Permission to use this data is contingent upon your acceptance of the terms of this agreement and upon your providing appropriate acknowledgments of NIST’s creation of the data/work."

## General comment
This cradle-to-gate unit process dataset is for the production of 1 kg of electronics for control units, which are equated to a solar optimizer according to Kneifel et al. (2022).
This unit process includes raw material acquisition; manufacturing; manufacture and installation of capital equipment; and transport.

## Technology
This process represents the production of solar optimizers using an estimated composition of the electronics for control units in the chemical industry based on literature from the calendar years 1990-2004.
Control units are used in the chemical industry to operate each device. The main components of such a control unit are (i) the electronic parts (usually some mounted PWB), (ii) cables (internal, but also for relying the control unit to the device) and, (iii) the housing around the whole unit (Althaus et al., 2007).

## Geography
Althaus et al (2009) indicated data had no specific geographical origin, as values came from literature.

## Time period
Althaus et al. (2007) does not specify exact dates, but the Start and the end date are for the calendar years 1990 and 2005.

## Reference product
- Electronics for control units: 1 kg

## Inputs from technosphere
- Printed wiring board mounting plant; at user: 2.08e-7 Item(s); normal sd 3.77; data quality (4,1,5,1,5)
- Polyethylene, high density, HDPE, virgin resin, at plant: 0.33166 kg; = 0.322*1.03; normal sd 1.46; data quality (4,4,5,1,5)
- Injection molding; at plant: 0.33166 kg; = 0.322*1.03; normal sd 1.46; data quality (4,4,5,1,5); provider Injection molding Bridge; Building systems to USLCI
- Cable, connector for computer, without plugs: 0.123 kg; normal sd 1.46; data quality (4,4,5,1,5)
  The amount should be 0.131 m
- Network cable without plugs; category 5; at plant: 1.11 m; normal sd 1.46; data quality (4,4,5,1,5)
- Transport, combination truck, average fuel mix: 0.1 t*km; normal sd 2.09; data quality (4, 5, 5, 1, 5)
- Steel sheet rolling; at plant: 0.46 kg; normal sd 1.46; data quality (4,4,5,1,5)
- Steel; hot rolled coil, at plant: 0.46 kg; normal sd 1.46; data quality (4,4,5,1,5)
  Low-alloyed, includes material and coiling
- Ribbon cable; at plant; 20-pin: 0.032 kg; normal sd 1.46; data quality (4,4,5,1,5)
- Printed wiring board, surface mounted, unspec., Pb free, at plant: 0.14 m2; normal sd 1.46; data quality (4,4,5,1,5)
- Transport, train, diesel powered: 0.2 t*km; normal sd 2.09; data quality (4, 5, 5, 1, 5)

## Inventory method
Attributional cradle-to-gate.

## Modelling constants
Althaus et al. (2007) assumed a standard distance of 100 km for truck transport, and 200 km for train transport.

## Completeness
Treatment of Missing Environmental Data
Althaus et al. (2007) offered no information on cutoff criteria or flows that might have not been considered.

Treatment of Missing Technosphere Document
Althaus et al. (2007) offered no information on cutoff criteria or flows that might have not been considered.

Mass Balance
No mass balance was calculated for this process.

## Data selection
This unit process was modeled based on Althaus et al. (2007) inventory for electronics for control units available on Table 2.8 of said report.

## Data treatment
The values in the LCI in Althaus et al. (2007) reflect the expert judgement of the authors, since they do not seem a weighted average of the different studies.

Process data quality
Based on the information included in the “Data completeness section”, the data quality characteristic (DQC) ""Process completeness"" was given a score of 2 (60-79 % of determined flow have been evaluated and given a value). It is likely the original report went through a review process, but because it is not explicitly mentioned, the data quality characteristic ""Process review"" was left as default (No documented review) and thus with a score of 5."

## Data collection
Between calendar years 1990 and 2004, both included, based Althaus et al. (2007)

## Sampling procedure
System boundaries
The system boundary is cradle to gate and includes material, transport, and infrastructure.

Data collection
The data that made Althaus et al. (2007)) LCI is based on own estimations and values from Frischknecht et al. (1996). See the original source for details.

Uncertainty
Althaus et al. (2007) included a standard deviation for all flows, which is repeated here.

## Intended application
Situation C2 - Accounting, without system-external interactions - The intended application is a purely descriptive accounting / documentation of the analyzed system excluding interactions with other systems in the LCI model.
The target audience of this model are LCA practitioners, the silicon, solar and related industries and the general public. The inventory is considered largely complete, except for land transformation activities. For that reason, it is not recommended to use this dataset when evaluating land use impact categories. The results of the National Institute of Standards and Technology’s data gap analysis were analyzed using the ISO 21930-LCIA-US impact assessment methodology, as well as Cumulative Energy Demand and a subset of ReCiPe 2016 impact categories.
The original application of this dataset was the identification of data gaps in the Federal LCA Commons (FLCAC) (see ""Project"" above). However, the intended application is to provide a cradle-to-gate inventory (A1-A3, according to ISO 21930) using exclusively processes currently available in USLCI or generated as part of the project mentioned above, and elementary flows from the Federal Elementary Flow List (FEDEFL) to enable the use of a fuller range of LCIA impact categories than those reported in EPDs. For data quality purposes, the intended application is to provide a US average inventory for the year of publication of the original source.

## Project
This dataset was developed as part of the “Public Life Cycle Inventory Data Gap Analysis for Silicon-based Residential Photovoltaic Systems” National Institute of Standards and Technology’s Technical Note.

## Review Not reviewed
Unlike other sections in Althaus et al. (2009), the one on Electronics for control units does not mention any reviewer.

## Sources
- Frischknecht et al. (1996) LCA Energy Systems
- Althaus et al. (2009) LCI Chemicals
- Kneifel et al. (2022) PV2
