# Single-Si wafer; photovoltaics; at plant

Dataset: openLCA process, unit process
Category: 31-33: Manufacturing/3344: Semiconductor and Other Electronic Component Manufacturing
Geography: United States
Time period: 2020-01-04 to 2020-11-30
Data quality: US EPA - Process Pedigree Matrix (5;1)
Exchange data quality scheme: US EPA - Flow Pedigree Matrix
Generated by: Gonzalo Rodriguez-Garcia
Owner: National Institute of Standards and Technology
isCopyrightProtected: false
restrictionsDescription: This data/work was created by employees of the National Institute of Standards and Technology (NIST), an agency of the Federal Government. Pursuant to title 17 United States Code Section 105, works of NIST employees are not subject to copyright protection in the United States.  This data/work may be subject to foreign copyright.
The data/work is provided by NIST as a public service and is expressly provided “AS IS.” NIST MAKES NO WARRANTY OF ANY KIND, EXPRESS, IMPLIED OR STATUTORY, INCLUDING, WITHOUT LIMITATION, THE IMPLIED WARRANTY OF MERCHANTABILITY, FITNESS FOR A PARTICULAR PURPOSE, NON-INFRINGEMENT AND DATA ACCURACY. NIST does not warrant or make any representations regarding the use of the data or the results thereof, including but not limited to the correctness, accuracy, reliability or usefulness of the data. NIST SHALL NOT BE LIABLE AND YOU HEREBY RELEASE NIST FROM LIABILITY FOR ANY INDIRECT, CONSEQUENTIAL, SPECIAL, OR INCIDENTAL DAMAGES (INCLUDING DAMAGES FOR LOSS OF BUSINESS PROFITS, BUSINESS INTERRUPTION, LOSS OF BUSINESS INFORMATION, AND THE LIKE), WHETHER ARISING IN TORT, CONTRACT, OR OTHERWISE, ARISING FROM OR RELATING TO THE DATA (OR THE USE OF OR INABILITY TO USE THIS DATA), EVEN IF NIST HAS BEEN ADVISED OF THE POSSIBILITY OF SUCH DAMAGES.
To the extent that NIST may hold copyright in countries other than the United States, you are hereby granted the non-exclusive irrevocable and unconditional right to print, publish, prepare derivative works and distribute the NIST data, in any medium, or authorize others to do so on your behalf, on a royalty-free basis throughout the world.
You may improve, modify, and create derivative works of the data or any portion of the data, and you may copy and distribute such modifications or works. Modified works should carry a notice stating that you changed the data and should note the date and nature of any such change. Please explicitly acknowledge the National Institute of Standards and Technology as the source of the data:  Data citation recommendations are provided at https://www.nist.gov/open/license.
Permission to use this data is contingent upon your acceptance of the terms of this agreement and upon your providing appropriate acknowledgments of NIST’s creation of the data/work.

## General comment
This cradle-to-gate unit process dataset is for the production of 1 m2 of single crystalline silicon wafer.
This unit process includes raw material acquisition; production; transport; production and use of fuels, and electricity; disposal of process waste; ancillary materials manufacturing; manufacture, and installation of capital equipment.

## Technology
According to de Wild-Scholten (2014) the production of single-crystalline silicon wafers consists of six steps:
“Step 1: Cropping the tops and tails from the ingot […]
Step 2: Squaring [t]he monocrystalline silicon crystal […] to bricks by band saws or wire sawing.
Step 3: [Surface] grinding and [edge] chamfering ([edge] grinding) of the bricks is done to give the brick a shiny surface and smooth corners. […]
Step 4: Wafer slicing with wire saw [diamond wire cutting]
Step 5: Wafer cleaning
Step 6: Metrology”

## Geography
Frischknecht et al. (2020) is based on de Wild-Scholten (2014), Woodhouse et al (2019), and VDMA (2020). These sources do not specify the location from where their data was gathered.

## Time period
The period spans from the publication date of the latest study cited by Frischknecht et al. (2020) and the date of the publication of their report.

## Reference product
- Single-Si wafer; photovoltaics; at plant [United States]: 1 m2

## Inputs from technosphere
- Transport, combination truck, average fuel mix [United States]: 0.236 t*km; normal sd 2.09; data quality (4,1,5,1,5)
- Steel, stainless 304, flat rolled coil [RNA]: 0.00151 kg; normal sd 1.32; data quality (5,1,5,1,5)
  Proxy for diamond wire, according to Frischknecht et al. (2020)
- Dipropylene glycol monomethyl ether, at plant [United States]: 0.3 kg; normal sd 1.22; data quality (4,4,5,1,5)
- Linear alkylbenzene sulfonate; at plant [United States]: 0.24 kg; normal sd 1.22; data quality (4,5,1,5,5)
- Electricity, AC, 120 V [United States]: 4.76 kWh; normal sd 2.05; data quality (2,1,5,1,5); provider Electricity Bridge; Building Systems to US Electricity Baseline
- Flat glass, uncoated, at plant [United States]: 0.00999 kg; normal sd 1.26; data quality (4,4,5,1,5)
- Hydrochloric acid, without water, in 30% solution state, at plant [United States]: 0.0027 kg; normal sd 1.22; data quality (4,4,5,1,5)
- Acetic acid, at plant [United States]: 0.039 kg; normal sd 1.22; data quality (4,4,5,1,5)
- Transport, train, diesel powered [United States]: 1.25 t*km; normal sd 2.09; data quality (4,1,5,1,5)
- Wire drawing; steel; at plant [United States]: 0.00895 kg; normal sd 1.32; data quality (2,1,5,1,5)
- Natural gas, combusted in industrial boiler [United States]: 4 MJ; normal sd 1.22; data quality (4,4,5,1,5)
- Silicon; single crystalline, Czochralski process; at plant [United States]: 0.595 kg; normal sd 1.22; data quality (2,1,5,1,5)
- Brass; at plant [United States]: 0.24 kg; normal sd 1.22; data quality (4,4,5,1,5)
- Sodium hydroxide, production mix, at plant [United States]: 0.015 kg; normal sd 1.22; data quality (5,1,5,1,5)
- Acrylic binder; at plant [United States]: 0.002 kg; normal sd 1.22; data quality (4,1,5,1,5)
- Water, process, deionized [United States]: 55.6 kg; normal sd 1.26; data quality (2,1,5,1,5)
- Wafer factory [United States]: 4e-6 Item(s); normal sd 3.05; data quality (4,4,1,5,5)

## Waste to treatment
- Disposal, non-hazardous waste, to landfill [United States]: 0.11 kg; normal sd 1.22; data quality (4,5,5,1,5); provider Disposal, non-hazardous waste, to landfill Bridge; Building Systems to USEEIO
  disposal, waste, Si waferprod., inorg, 9.4% water, to residual material landfill
- Wastewater treatment level 1; Conventional plug flow activated sludge aggregate, solids reduction; at plant [United States]: 0.05 m3; normal sd 1.63; data quality (4, 1, 5, 1, 5)
  Proxy. Frischknecht et al. (2020) mentions "To wastewater treamtent plant, class 2"

## Emissions to nature
- Chemical Oxygen Demand [emission, water]: 0 kg; data quality (4,5,5,1,5)
  2.95E-2 kg, removed to avoid double counting with BOD
- Water, fresh [emission, air]: 5.56 kg; normal sd 1.65; data quality (4,5,5,1,5)
- Biological Oxygen Demand [emission, water]: 0.0295 kg; normal sd 1.85; data quality (4,5,5,1,5)
- Total Organic Carbon [emission, air]: 0 kg; data quality (4,5,1,5,5)
  1.11E-2 kg, removed to avoid double counting with BOD
- Dissolved Organic Carbon [emission, water]: 0 kg; data quality (4,5,1,1,5)
  1.11E-2 kg, removed to avoid double counting with BOD
- Energy, heat [emission, air]: 17.1 MJ; normal sd 1.34; data quality (4,5,5,1,5)

## Inventory method
Attributional cradle-to-gate

## Modelling constants
Frischknecht et al (2020) assumed a truck transport of 200 km for the silicon, and 100 km for everything else. They also assumed train transport of 100-600 km, although it is not specified to which materials does it apply.
Frischknecht et al. (2020) assumed heat losses were equal to the electricity used. This is not explicitly mentioned there but can be found in de Wild-Scholten (2014).
Emissions of water to air are assumed to be 5% of cooling water.

## Completeness
Treatment of Missing Environmental Data
Frischknecht et al. (2015, 2020), and de Wild-Scholten (2014) offer no information on cutoff criteria or flows that might have not been considered.
Treatment of Missing Technosphere Data
Frischknecht et al. (2015, 2020), and de Wild-Scholten (2014) offer no information on cutoff criteria or flows that might have not been considered.
Mass Balance
The mass balance for this process was not calculated.

## Data selection
This unit process was modeled based on Frischknecht et al. (2020) inventory for single crystalline silicon wafers, available on Table 13 of said report. It is based on multiple sources, de Wild-Scholten (2014), Woodhouse et al. (2019) and VDMA (2020).

## Data treatment
The values in the LCI in Frischknecht et al. (2020) reflect the expert judgement of the authors and of the sources they cite, since none suggest a weighted average from different sources/reports.
Process data quality
Based on the information included in the “Data completeness section”, the data quality characteristic (DQC) "Process completeness" was given a score of 1 (>80 % of determined flow have been evaluated and given a value). It is likely the original report went through a review process, but because it is not explicitly mentioned, the data quality characteristic "Process review" was left as default (No documented review) and thus with a score of 5.

## Data collection
Data to build this inventory ranges at least from the calendar year 2006 (some data nominally from de Wild-Scholten (2014) is from de Wild Scholten and Alsema (2007), whose data is from 2006 at the earliest) to 2019 (electricity use, based on VDMA, 2020)

## Sampling procedure
System boundary conditions
The system boundary is cradle to gate and includes direct emissions, material and energy use, waste treatment, transport, and infrastructure.
Data collection
The data that made Frischknecht et al. (2020) LCI is based on previous reports. See “data selection” above and the original source for details.
Uncertainty
Frischknecht et al. (2020) included a standard deviation for all flows, which is repeated here.

## Intended application
"Situation C2 - Accounting, without system-external interactions - The intended application is a purely descriptive accounting / documentation of the analyzed system excluding interactions with other systems in the LCI model.
The target audience of this model are LCA practitioners, the concrete and related industries, and the general public. The inventory is considered largely complete, except for land transformation activities. For that reason, it is not recommended to use this dataset when evaluating land use impact categories. The results of the National Institute of Standards and Technology’s data gap analysis were analyzed using the ISO 21930-LCIA-US impact assessment methodology.
The original application of this dataset was the identification of data gaps in the Federal LCA Commons (FLCAC) (see ""Project"" above). However, the intended application is to provide a cradle-to-gate inventory (A1-A3, according to ISO 21930) using exclusively processes currently available in USLCI or generated as part of the project mentioned above, and elementary flows from the Federal Elementary Flow List (FEDEFL) to enable the use of a fuller range of LCIA impact categories than those reported in EPDs. For data quality purposes, the intended application is to provide a US average inventory for the year of publication of the original source. "

## Project
This dataset was developed as part of the “Public Life Cycle Inventory Data Gap Analysis for Silicon-based Photovoltaic panels” National Institute of Standards and Technology’s Technical Note.

## Sources
- Frischknecht et al. (2015) LCI PV
- Frischknecht et al. (2020) LCI PV
- de Wild-Schloten (2014) LCI PV
- VDMA (2020) Roadmap PV
- de Wild-Scholten and Alsema (2007) LCI PV
- Woodhouse et al. (2019) Cost Si PV
