# Photovoltaic panel, multi-Si; at plant

Dataset: openLCA process, unit process
Category: 31-33: Manufacturing/3359: Other Electrical Equipment and Component Manufacturing
Geography: United States
Time period: 2020-01-02 to 2020-11-30
Data quality: US EPA - Process Pedigree Matrix (5;1)
Exchange data quality scheme: US EPA - Flow Pedigree Matrix
Generated by: Gonzalo Rodriguez-Garcia
Owner: National Institute of Standards and Technology
isCopyrightProtected: false
restrictionsDescription: This data/work was created by employees of the National Institute of Standards and Technology (NIST), an agency of the Federal Government. Pursuant to title 17 United States Code Section 105, works of NIST employees are not subject to copyright protection in the United States.  This data/work may be subject to foreign copyright.
The data/work is provided by NIST as a public service and is expressly provided “AS IS.” NIST MAKES NO WARRANTY OF ANY KIND, EXPRESS, IMPLIED OR STATUTORY, INCLUDING, WITHOUT LIMITATION, THE IMPLIED WARRANTY OF MERCHANTABILITY, FITNESS FOR A PARTICULAR PURPOSE, NON-INFRINGEMENT AND DATA ACCURACY. NIST does not warrant or make any representations regarding the use of the data or the results thereof, including but not limited to the correctness, accuracy, reliability or usefulness of the data. NIST SHALL NOT BE LIABLE AND YOU HEREBY RELEASE NIST FROM LIABILITY FOR ANY INDIRECT, CONSEQUENTIAL, SPECIAL, OR INCIDENTAL DAMAGES (INCLUDING DAMAGES FOR LOSS OF BUSINESS PROFITS, BUSINESS INTERRUPTION, LOSS OF BUSINESS INFORMATION, AND THE LIKE), WHETHER ARISING IN TORT, CONTRACT, OR OTHERWISE, ARISING FROM OR RELATING TO THE DATA (OR THE USE OF OR INABILITY TO USE THIS DATA), EVEN IF NIST HAS BEEN ADVISED OF THE POSSIBILITY OF SUCH DAMAGES.
To the extent that NIST may hold copyright in countries other than the United States, you are hereby granted the non-exclusive irrevocable and unconditional right to print, publish, prepare derivative works and distribute the NIST data, in any medium, or authorize others to do so on your behalf, on a royalty-free basis throughout the world.
You may improve, modify, and create derivative works of the data or any portion of the data, and you may copy and distribute such modifications or works. Modified works should carry a notice stating that you changed the data and should note the date and nature of any such change. Please explicitly acknowledge the National Institute of Standards and Technology as the source of the data:  Data citation recommendations are provided at https://www.nist.gov/open/license.
Permission to use this data is contingent upon your acceptance of the terms of this agreement and upon your providing appropriate acknowledgments of NIST’s creation of the data/work.

## General comment
This cradle-to-gate unit process dataset is for the production of 1 m2 of multi crystalline silicon panel.
This unit process includes raw material acquisition; production; transport; production and use of fuels, and electricity; disposal of process waste; ancillary materials manufacturing; manufacture, and installation of capital equipment.

## Technology
According to Woodhouse et al. (2019) the assembly of single/multi-crystalline silicon panels “…involves electrically connecting cells into strings, arranging parallel cell strings into an array, electrically connecting the strings with metallic ribbons, mounting the array onto a layer of encapsulant on top of a sheet of glass or backsheet, and laminating another sheet of encapsulant and front glass onto the whole assembly. […] Front and back encapsulants […] melt […] when heated during the lamination process—thereby encasing the entire assembly between a sheet of glass on the front and either a backsheet or another sheet of glass on the back. The ribbons are fed through a hole in the back glass or backsheet and interwoven on the back of the module within a junction box, which contains diodes to reduce cell mismatch and serves as the point of contact between modules in an installed system. Finally, an extruded aluminum frame is typically put around the perimeter of the module”.

## Geography
Frischknecht et al. (2020) is based on de Wild-Scholten (2014), and Woodhouse et al (2019). These reports do not specify the location from where their data was gathered.

## Time period
The period spans from the publication date of the latest study cited by Frischknecht et al. (2020) and the date of the publication of their report.

## Reference product
- Photovoltaic panel, multi-Si; at plant [United States]: 1 m2

## Inputs from technosphere
- Transport, combination truck, average fuel mix [United States]: 2.99 t*km; normal sd 2.09; data quality (4,5,5,1,5)
- Unspecified diode; at plant [United States]: 0.00281 kg; normal sd 1.24; data quality (4,4,5,1,5)
- Drinking water treatment; U.S. Average Treatment [United States]: 5.03 l; normal sd 1.24; data quality (1, 4, 5, 1, 5)
- Polyethylene, high density, HDPE, virgin resin, at plant [United States]: 0.0238 kg; normal sd 1.24; data quality (4,4,5,1,5)
- Polyvinylfluoride, at plant [United States]: 0.112 kg; normal sd 1.24; data quality (1,4,5,1,5); provider Polyvinylfluoride Bridge; Building Systems to USEEIO
- Copper, at regional storage [United States]: 0.103 kg; normal sd 1.24; data quality (1,4,5,1,5); provider Copper, at storage Bridge; Building Systems to USEEIO
- Electricity, AC, 120 V [United States]: 14 kWh; normal sd 1.24; data quality (2,1,5,1,5); provider Electricity Bridge; Building Systems to US Electricity Baseline
- Isopropanol; at plant [United States]: 0.000147 kg; normal sd 1.34; data quality (4,4,5,1,5)
- Photovoltaic cell, multi-Si; 2018 consumption mix, at wholesale [United States]: 0.935 m2; normal sd 3.06; data quality (1,4,5,1,5)
- Pallet, for packaging [United States]: 0.05 Item(s); normal sd 1.34; data quality (4,4,5,1,5)
- Polyethylene terephthalate, PET, virgin resin, at plant, kg [United States]: 0.346 kg; normal sd 1.24; data quality (1,4,5,1,5)
- Photovoltaic panel factory [United States]: 4e-6 Item(s); normal sd 3.06; data quality (4,4,5,1,5)
- Light emitting diode, LED, at plant [United States]: 0.00281 kg; normal sd 1.24; data quality (1,4,5,1,5)
- 1-propanol; at plant [United States]: 0.0159 kg; normal sd 1.24; data quality (1,4,5,1,5)
- Hydrogen fluoride, at plant [United States]: 0.0624 kg; normal sd 1.34; data quality (1,4,5,1,5); provider Hydrogen Fluoride Bridge; Building Systems to USEEIO
- Copper wire drawing; at plant [United States]: 0.103 kg; normal sd 1.24; data quality (1,4,5,1,5)
- Corrugated product, average production, at mill [United States]: 0.763 kg; normal sd 1.24; data quality (1,4,5,1,5)
- Tin; at plant [United States]: 0.0129 kg; normal sd 1.33; data quality (4,4,5,1,5)
- Solar glass; low-iron; at plant [United States]: 8.81 kg; normal sd 1.34; data quality (1,4,5,1,5)
- Transport, train, diesel powered [United States]: 16.6 t*km; normal sd 2.09; data quality (4,5,5,1,5)
- Potassium hydroxide; at plant [United States]: 0.0514 kg; normal sd 1.34; data quality (4,4,5,1,5)
- Tempering, flat glass; at plant [United States]: 8.81 kg; normal sd 1.24; data quality (1,4,5,1,5)
- AlMg3 aluminum alloy; at plant [United States]: 2.13 kg; normal sd 1.24; data quality (1,4,5,1,5); provider AlMg3 aluminum alloy Bridge; Building Systems to USLCI
- Diesel, combusted in industrial equipment [United States]: 0.00875 MJ; normal sd 2.12; data quality (4,4,5,1,5)
- Soap stock, at plant [United States]: 0.0116 kg; normal sd 1.34; data quality (4,4,5,1,5)
- Glass fiber, reinforced polymer [United States]: 0.295 kg; normal sd 1.24; data quality (1,4,5,1,5)
- Ethylene-vinyl acetate; at plant [United States]: 0.875 kg; normal sd 1.24; data quality (1,4,5,1,5)
- Lead, at regional storage [United States]: 0.000725 kg; normal sd 1.33; data quality (4,4,5,1,5)
- Silicone product, at plant [United States]: 0.122 kg; normal sd 1.24; data quality (1,4,5,1,5)

## Waste to treatment
- Disposal, hazardous waste, to incineration [United States]: 0.0281 kg; normal sd 1.24; data quality (4,4,5,1,5)
  Plastics
- Wastewater treatment level 1; Conventional plug flow activated sludge aggregate, solids reduction; at plant [United States]: 0.00453 m3; normal sd 1.63; data quality (3, 4, 5, 1, 5)
  Proxy. Frischknecht et al. (2020) mentions "to wastewater treatment, class 2"
- Disposal, non-hazardous waste, to incineration [United States]: 0.03 kg; normal sd 1.24; data quality (5,4,5,1,5)
  Municipal solid waste
- Disposal, hazardous waste, to incineration [United States]: 0.00429 kg; normal sd 1.24; data quality (4,4,5,1,5)
  Polyvinlyl fluoride
- Disposal, hazardous waste, to incineration [United States]: 0.00161 kg; normal sd 1.24; data quality (4,4,5,1,5)
  Waste mineral oil

## Emissions to nature
- Water, fresh [emission, air]: 0.503 kg; normal sd 1.85; data quality (4,5,5,1,5)
- Volatile organic compounds [emission, air]: 0.00806 kg; normal sd 1.85; data quality (4,5,5,1,5)
- Energy, heat [emission, air]: 50.3 MJ; normal sd 1.6; data quality (3,5,5,1,5)
- Carbon dioxide [emission, air]: 0.0218 kg; normal sd 1.6; data quality (4,5,5,1,5)

## Inventory method
Attributional cradle-to-gate

## Modelling constants
Frischknecht et al. (2020) assumed heat losses were equal to the electricity used.
Frischknecht et al. (2020) assumed emissions of water to air are assumed to be 10% of process water. They, however, refer to de Wild-Scholten (2014)’s inventory, which does not include water emissions.

## Completeness
Treatment of Missing Environmental Data
Frischknecht et al. (2015, 2020), and de Wild-Scholten (2014) offer no information on cutoff criteria or flows that might have not been considered.
Treatment of Missing Technosphere Data
Frischknecht et al. (2015, 2020), and de Wild-Scholten (2014) offer no information on cutoff criteria or flows that might have not been considered.
Mass Balance
The mass balance for this process was not calculated.

## Data selection
This unit process was modeled based on Frischknecht et al. (2020) inventory for multi crystalline silicon panels, available on Table 20 of said report. It is based de Wild-Scholten (2014), which is in turn partially based on de Wild-Scholten and Alsema (2007), and in Woodhouse et al. (2019).

## Data treatment
The values in the LCI in Frischknecht et al. (2020) reflect the expert judgement of the authors and of the sources they cite, since none suggest a weighted average from different sources/reports.
Process data quality
Based on the information included in the “Data completeness section”, the data quality characteristic (DQC) "Process completeness" was given a score of 1 (>80 % of determined flow have been evaluated and given a value). It is likely the original report went through a review process, but because it is not explicitly mentioned, the data quality characteristic "Process review" was left as default (No documented review) and thus with a score of 5.

## Data collection
Data to build this inventory ranges at least from the calendar year 2006 (some data nominally from de Wild-Scholten (2014) is from de Wild Scholten and Alsema (2007), whose data is from 2006 at the earliest) to 2018 (electricity use, based on Woodhouse et al., 2019).

## Sampling procedure
System boundary conditions
The system boundary is cradle to gate and includes direct emissions, material and energy use, waste treatment, transport, and infrastructure.
Data collection
The data that made Frischknecht et al. (2020) LCI is based on previous reports. See “data selection” above and the original source for details.
Uncertainty
Frischknecht et al. (2020) included a standard deviation for all flows, which is repeated here.

## Intended application
Situation C2 - Accounting, without system-external interactions - The intended application is a purely descriptive accounting / documentation of the analyzed system excluding interactions with other systems in the LCI model.
The target audience of this model are LCA practitioners, the silicon, solar and related industries and the general public. The inventory is considered largely complete, except for land transformation activities. For that reason, it is not recommended to use this dataset when evaluating land use impact categories. The results of the National Institute of Standards and Technology’s data gap analysis were analyzed using the ISO 21930-LCIA-US impact assessment methodology, as well as Cumulative Energy Demand and a subset of ReCiPe 2016 impact categories.
The original application of this dataset was the identification of data gaps in the Federal LCA Commons (FLCAC) (see "Project" above). However, the intended application is to provide a cradle-to-gate inventory (A1-A3, according to ISO 21930) using exclusively processes currently available in USLCI or generated as part of the project mentioned above, and elementary flows from the Federal Elementary Flow List (FEDEFL) to enable the use of a fuller range of LCIA impact categories than those reported in EPDs. For data quality purposes, the intended application is to provide a US average inventory for the year of publication of the original source.

## Project
This dataset was developed as part of the “Public Life Cycle Inventory Data Gap Analysis for Silicon-based Photovoltaic panels” National Institute of Standards and Technology’s Technical Note.

## Sources
- Frischknecht et al. (2015) LCI PV
- Frischknecht et al. (2020) LCI PV
- de Wild-Scholten and Alsema (2007) LCI PV
- Woodhouse et al. (2019) Cost Si PV
- de Wild-Schloten (2014) LCI PV
