# Open ground construction; on ground

Dataset: openLCA process, unit process
Category: 23: Construction/2382: Building Equipment Contractors
Geography: Switzerland
Time period: 2008-12-31 to 2020-11-30
Data quality: US EPA - Process Pedigree Matrix (5; 1)
Exchange data quality scheme: US EPA - Flow Pedigree Matrix
Generated by: Gonzalo Rodriguez-Garcia
Owner: National Institute of Standards and Technology
isCopyrightProtected: false
restrictionsDescription: This data/work was created by employees of the National Institute of Standards and Technology (NIST), an agency of the Federal Government. Pursuant to title 17 United States Code Section 105, works of NIST employees are not subject to copyright protection in the United States.  This data/work may be subject to foreign copyright.
The data/work is provided by NIST as a public service and is expressly provided “AS IS.” NIST MAKES NO WARRANTY OF ANY KIND, EXPRESS, IMPLIED OR STATUTORY, INCLUDING, WITHOUT LIMITATION, THE IMPLIED WARRANTY OF MERCHANTABILITY, FITNESS FOR A PARTICULAR PURPOSE, NON-INFRINGEMENT AND DATA ACCURACY. NIST does not warrant or make any representations regarding the use of the data or the results thereof, including but not limited to the correctness, accuracy, reliability or usefulness of the data. NIST SHALL NOT BE LIABLE AND YOU HEREBY RELEASE NIST FROM LIABILITY FOR ANY INDIRECT, CONSEQUENTIAL, SPECIAL, OR INCIDENTAL DAMAGES (INCLUDING DAMAGES FOR LOSS OF BUSINESS PROFITS, BUSINESS INTERRUPTION, LOSS OF BUSINESS INFORMATION, AND THE LIKE), WHETHER ARISING IN TORT, CONTRACT, OR OTHERWISE, ARISING FROM OR RELATING TO THE DATA (OR THE USE OF OR INABILITY TO USE THIS DATA), EVEN IF NIST HAS BEEN ADVISED OF THE POSSIBILITY OF SUCH DAMAGES.
To the extent that NIST may hold copyright in countries other than the United States, you are hereby granted the non-exclusive irrevocable and unconditional right to print, publish, prepare derivative works and distribute the NIST data, in any medium, or authorize others to do so on your behalf, on a royalty-free basis throughout the world.
You may improve, modify, and create derivative works of the data or any portion of the data, and you may copy and distribute such modifications or works. Modified works should carry a notice stating that you changed the data and should note the date and nature of any such change. Please explicitly acknowledge the National Institute of Standards and Technology as the source of the data:  Data citation recommendations are provided at https://www.nist.gov/open/license.
Permission to use this data is contingent upon your acceptance of the terms of this agreement and upon your providing appropriate acknowledgments of NIST’s creation of the data/work.

## General comment
This cradle-to-gate unit process dataset is for the production of Open ground construction; on ground.
This unit process includes raw material acquisition; manufacturing; transport; production and use of electricity; disposal of process waste; ancillary materials manufacturing; and transport of service personnel.

## Technology
This process represent the construction of an open ground installation for residential photovoltaic systems for residential photovoltaic systems using average technology for Europe from the calendar years 1991-2008.
Open ground starts by positioning foundation profiles, which are then piled or screwed into the ground and the height leveled. Finally, the rest of the system is mounted and the panels fixed.

## Geography
Assumed, since a large fraction of the data used for the inventory in Jungbluth et al. (2012) comes from Swiss publications.

## Time period
The period spans from the publication date of the latest study used in Jungbluth et al. (2012) to the publication date of Frischknecht et al. (2020), since the model has remained effectively the same throughout this period.

## Reference product
- Open ground construction; on ground: 1 m2

## Inputs from technosphere
- Polyethylene, high density, HDPE, virgin resin, at plant: 0.000909091 kg; normal sd 2.05; data quality (1,1,5,1,5)
- Corrugated product, average production, at mill [US]: 0.0863636 kg; normal sd 2.18; data quality (4,3,5,1,5)
  Proxy for "mixed fibre, single wall"
- Steel pieces; zinc coating; at plant: 0.156488 m2; normal sd 2.18; data quality (4,3,5,1,5)
- Aluminium, extrusion, at plant [RNA]: 3.9767 kg; normal sd 2.18; data quality (4,3,5,1,5)
  Includes both the material and the extrusion process
- Polystyrene, high impact, HIPS, resin, at plant [RNA]: 0.00454545 kg; normal sd 2.18; data quality (4,3,5,1,5)
- Steel, stainless 304, flat rolled coil [RNA]: 0.247467 kg; normal sd 2.102; data quality (2,1,5,1,5)
  Equivalent to 18/8 (18% Cr, 8% Ni)
- Wire drawing; steel; at plant: 1.05897 kg; normal sd 2.18; data quality (4,3,5,1,5)
- Reinforcing steel; at plant: 7.20895 kg; normal sd 2.102; data quality (2,1,5,1,5); provider Reinforcing steel Bridge; Building Systems to USLCI
- Steel section bar rolling; at plant: 6.14999 kg; normal sd 2.18; data quality (4,3,5,1,5)
- Transport, light commercial truck, diesel powered: 1.14386 t*km; normal sd 2.09; data quality (4,5,5,1,5)
- Transport, combination truck, average fuel mix: 0.216718 t*km; normal sd 2.09; data quality (4,5,5,1,5)
- Steel coil; zinc coating; at plant: 0.109172 m2; normal sd 2.18; data quality (4,3,5,1,5)
- Transport, train, diesel powered: 5.13908 t*km; normal sd 2.09; data quality (4,5,5,1,5)
- Ready-mix concrete; U.S. national benchmark mix design, at plant; 3000 psi: 0.000537463 m3; data quality (4,3,5,1,5); provider Ready-mix concrete; 3000 psi Bridge Building Systems to Construction Materials
  Proxy for "Normal Strenght concrete"

## Inputs from nature
- Occupation, urban, green area [resource, land]: 96.5598 m2*a; normal sd 2.37; data quality (4,5,1,5,5)
  Proxy for "industrial area, vegetation"
- Transformation, from grassland, natural, for livestock grazing [resource, land]: 4.71866 m2; normal sd 2; data quality (4,5,5,1,5)
  Proxy for "from pasture and meadow"
- Transformation, to urban/industrial fallow (non-use) [resource, land]: 1.5 m2; normal sd 3.23; data quality (4,5,5,1,5)
  Proxy for "to industrial area, built up"
- Transformation, to urban, green area [resource, land]: 3.21866 m2; normal sd 1.91; data quality (4,5,5,1,5)
  Proxy for "to industrial area, vegetation"
- Occupation, urban/industrial fallow (non-use) [resource, land]: 96.5598 m2*a; normal sd 5.37; data quality (4,5,5,1,5)
  Proxy for "industrial area, built up"

## Waste to treatment
- Waste polystyrene; unspecified treatment; at treatment plant: 0.00454545 kg; normal sd 2.18; data quality (4,3,5,1,5)
  Disposal, building, polystyrene isolation, flameretardant, to final disposal
- Disposal, corrugate packaging, to unspecified treatment: 0.0863636 kg; normal sd 2.18; data quality (4,3,5,1,5)
  Disposal, packaging cardboard, 19.6% water, to municipal incineration
- Waste polyethylene products; unspecified treatment; at treatment plant: 0.000909091 kg; normal sd 2.18; data quality (4,3,5,1,5)
  Disposal, building, polyethylene/polypropylene products, to final disposal

## Inventory method
Attributional cradle-to-gate.

## Modelling constants
Jungbluth et al. (2012) assumed a life time of 30 years, which is reflected in the occupation exchanges. A standard distance of 60 km is assumed for truck transport, 200 km and 600 km for train transport (to which materials does each distance applied is not specified), and 100 km for the van transport.

## Completeness
Treatment of Missing Environmental Data
Jungbluth et al. (2012) offered no information on cutoff criteria or flows that might have not been considered.
Treatment of Missing Technosphere Data
Jungbluth et al. (2012) offered no information on cutoff criteria or flows that might have not been considered.
Mass Balance
No mass balance was calculated for this process.

## Data selection
This unit process was modeled based on Frischknecht et al. (2020), which in turn is based on Jungbluth et al. (2012) inventory for an open ground system available on Table 11.18 of said report.

## Data treatment
The values in the LCI in Frischknecht et al. (2020) and Jungbluth et al. (2012) reflect the expert judgement of the authors, since they do not seem a weighted average of the different studies.
Process data quality
Based on the information included in the “Data completeness section”, the data quality characteristic (DQC) "Process completeness" was given a score of 2 (60-79 % of determined flow have been evaluated and given a value). It is likely the original report went through a review process, but because it is not explicitly mentioned, the data quality characteristic "Process review" was left as default (No documented review) and thus with a score of 5.

## Data collection
Between calendar years 1991 and 2006, both included, based on the studies cited in Jungbluth et al. (2012)

## Sampling procedure
System boundaries
The system boundary is cradle to gate and includes material use, waste treatment, and transport.
Data collection
The data that made Jungbluth et al. (2012) LCI is based on previous reports. See the original source for details.
Uncertainty
Frischknecht et al. (2020) included a standard deviation for all flows, which is repeated here.

## Intended application
Situation C2 - Accounting, without system-external interactions - The intended application is a purely descriptive accounting / documentation of the analyzed system excluding interactions with other systems in the LCI model.

The target audience of this model are LCA practitioners, the concrete and related industries, and the general public. The inventory is considered largely complete, except for land transformation activities. For that reason, it is not recommended to use this dataset when evaluating land use impact categories. The results of the National Institute of Standards and Technology’s data gap analysis were analyzed using the ISO 21930-LCIA-US impact assessment methodology.

The original application of this dataset was the identification of data gaps in the Federal LCA Commons (FLCAC) (see "Project" above). However, the intended application is to provide a cradle-to-gate inventory (A1-A3, according to ISO 21930) using exclusively processes currently available in USLCI or generated as part of the project mentioned above, and elementary flows from the Federal Elementary Flow List (FEDEFL) to enable the use of a fuller range of LCIA impact categories than those reported in EPDs. For data quality purposes, the intended application is to provide a US average inventory for the year of publication of the original source.

## Project
This dataset was developed as part of the "Public Life Cycle Inventory Data Gap Analysis through Process Modeling" National Institute of Standards and Technology Technical Note 2338. This dataset was developed after the publication of the Technical Note, and thus it is not discussed there.

## Review Dependent internal review
Colleagues at ESU-services Ldt. are acknowledged for their revision of data, but no other details on their review are available. Because it is not properly documented, the "Process review" data quality entry is left as "5: Not documented".

## Review Independent external review
Colleagues at the Paul Scherrer Institute are acknowledged for their revision of data, but no other details on their review are available. Because it is not properly documented, the "Process review" data quality entry is left as "5: Not documented"

## Sources
- Frischknecht et al. (2020) LCI PV
- SolarPowerEurope (2025) EU Solar Manufacturing Map
