# Waste c-Si PV panel, takeback and recycling; at treatment plant

Dataset: openLCA process, unit process
Category: 56: Administrative and Support and Waste Management and Remediation Services/5622: Waste Treatment and Disposal
Geography: Germany
Time period: 2015-01-01 to 2020-11-30
Allocation method: no allocation
Data quality: US EPA - Process Pedigree Matrix (5;2)
Exchange data quality scheme: US EPA - Flow Pedigree Matrix
Generated by: Gonzalo Rodriguez-Garcia
Owner: National Institute of Standards and Technology
isCopyrightProtected: false
restrictionsDescription: This data/work was created by employees of the National Institute of Standards and Technology (NIST), an agency of the Federal Government. Pursuant to title 17 United States Code Section 105, works of NIST employees are not subject to copyright protection in the United States.  This data/work may be subject to foreign copyright.
The data/work is provided by NIST as a public service and is expressly provided “AS IS.” NIST MAKES NO WARRANTY OF ANY KIND, EXPRESS, IMPLIED OR STATUTORY, INCLUDING, WITHOUT LIMITATION, THE IMPLIED WARRANTY OF MERCHANTABILITY, FITNESS FOR A PARTICULAR PURPOSE, NON-INFRINGEMENT AND DATA ACCURACY. NIST does not warrant or make any representations regarding the use of the data or the results thereof, including but not limited to the correctness, accuracy, reliability or usefulness of the data. NIST SHALL NOT BE LIABLE AND YOU HEREBY RELEASE NIST FROM LIABILITY FOR ANY INDIRECT, CONSEQUENTIAL, SPECIAL, OR INCIDENTAL DAMAGES (INCLUDING DAMAGES FOR LOSS OF BUSINESS PROFITS, BUSINESS INTERRUPTION, LOSS OF BUSINESS INFORMATION, AND THE LIKE), WHETHER ARISING IN TORT, CONTRACT, OR OTHERWISE, ARISING FROM OR RELATING TO THE DATA (OR THE USE OF OR INABILITY TO USE THIS DATA), EVEN IF NIST HAS BEEN ADVISED OF THE POSSIBILITY OF SUCH DAMAGES.
To the extent that NIST may hold copyright in countries other than the United States, you are hereby granted the non-exclusive irrevocable and unconditional right to print, publish, prepare derivative works and distribute the NIST data, in any medium, or authorize others to do so on your behalf, on a royalty-free basis throughout the world.
You may improve, modify, and create derivative works of the data or any portion of the data, and you may copy and distribute such modifications or works. Modified works should carry a notice stating that you changed the data and should note the date and nature of any such change. Please explicitly acknowledge the National Institute of Standards and Technology as the source of the data:  Data citation recommendations are provided at https://www.nist.gov/open/license.
Permission to use this data is contingent upon your acceptance of the terms of this agreement and upon your providing appropriate acknowledgments of NIST’s creation of the data/work.

## General comment
This cradle-to-gate unit process dataset is for the treatment of 1 kg of crystalline silicon photovoltaic panels.
This unit process includes transport; production and use of electricity; disposal of process waste; recovery of used products via reuse and recycling.

## Technology
This process represent the recycling of crystalline silicon photovoltaic modules using average technology for Europe from the calendar years 2015-2016).
It is based on mechnanical recycling operating in batches.

## Geography
The original inventory from Wambach et al. (2017) was based on one Belgian plant, two Italian, and two German. Germany is selected as the specific location because one of the Italian plants was an unsucessful pilot (see LIFE12 ENV/IT/000904 project, and supranational geographies do not work well with regionalized Life Cycle Impact Assessment Methods.

## Time period
The period spans from beginning of the collection period from Wambach et al. (2017) to the publication date of Frischknecht et al. (2020), since the model has remained valid throughout this period.

## Reference product
- Waste c-Si PV panel; takeback and recycling; at treatment plant: 1 kg; input; data quality (2,3,5,1,5); cost 0.275 Euro

## By-products
- Aluminum scrap; recovered from c-Si PV module treatment; at plant: 0.121 kg; cost 0.121*0.7 Euro
- Glass cullets; recovered from c-Si PV module treatment; at plant: 0.662197 kg; cost 0.662196721311475*0.02 Euro
- Copper scrap; recovered from c-Si PV module treatment; at plant: 0.044 kg; cost 0.044*4 Euro

## Inputs from technosphere
- Transport, combination truck, average fuel mix: 0.1 t*km; normal sd 2.09; data quality (4,5,5,1,5)
- Transport, train, diesel powered: 0.4 t*km; normal sd 2.09; data quality (4, 5, 5, 1, 5)
- Electricity, AC, 120 V: 0.111311 kWh; normal sd 1.25; data quality (2,3,5,1,5); provider Electricity Bridge; Building Systems to US Electricity Baseline
- Diesel, combusted in industrial equipment [RNA]: 0.0648 MJ; normal sd 2.07; data quality (2,3,5,1,5)

## Waste to treatment
- Disposal, plastic waste, unspecified: 0.0256525 kg; normal sd 1.25; data quality (2,3,5,1,5)
  To sanitary landfill
- Disposal, plastic waste, unspecified: 0.146903 kg; normal sd 1.25; data quality (2,3,5,1,5)
  To municipal incineration

## Allocation factors
- causal, Copper scrap; recovered from c-Si PV module treatment; at plant, for Diesel, combusted in industrial equipment: 0
- causal, Glass cullets; recovered from c-Si PV module treatment; at plant, for Disposal, plastic waste, unspecified: 0
- economic, Copper scrap; recovered from c-Si PV module treatment; at plant: 0
- causal, Glass cullets; recovered from c-Si PV module treatment; at plant, for Transport, combination truck, average fuel mix: 0
- causal, Waste c-Si PV panel; takeback and recycling; at treatment plant, for Electricity, AC, 120 V: 1
- causal, Copper scrap; recovered from c-Si PV module treatment; at plant, for Transport, combination truck, average fuel mix: 0
- causal, Waste c-Si PV panel; takeback and recycling; at treatment plant, for Disposal, plastic waste, unspecified: 1
- economic, Glass cullets; recovered from c-Si PV module treatment; at plant: 0
- causal, Copper scrap; recovered from c-Si PV module treatment; at plant, for Electricity, AC, 120 V: 0
- causal, Glass cullets; recovered from c-Si PV module treatment; at plant, for Diesel, combusted in industrial equipment: 0
- economic, Aluminum scrap; recovered from c-Si PV module treatment; at plant: 0
- causal, Aluminum scrap; recovered from c-Si PV module treatment; at plant, for Disposal, plastic waste, unspecified: 0
- physical, Copper scrap; recovered from c-Si PV module treatment; at plant: 0
- causal, Aluminum scrap; recovered from c-Si PV module treatment; at plant, for Transport, train, diesel powered: 0
- causal, Copper scrap; recovered from c-Si PV module treatment; at plant, for Disposal, plastic waste, unspecified: 0
- causal, Copper scrap; recovered from c-Si PV module treatment; at plant, for Transport, train, diesel powered: 0
- physical, Glass cullets; recovered from c-Si PV module treatment; at plant: 0
- causal, Aluminum scrap; recovered from c-Si PV module treatment; at plant, for Transport, combination truck, average fuel mix: 0
- causal, Aluminum scrap; recovered from c-Si PV module treatment; at plant, for Electricity, AC, 120 V: 0
- causal, Waste c-Si PV panel; takeback and recycling; at treatment plant, for Transport, combination truck, average fuel mix: 1
- physical, Aluminum scrap; recovered from c-Si PV module treatment; at plant: 0
- causal, Copper scrap; recovered from c-Si PV module treatment; at plant, for Disposal, plastic waste, unspecified: 0
- causal, Waste c-Si PV panel; takeback and recycling; at treatment plant, for Transport, train, diesel powered: 1
- causal, Aluminum scrap; recovered from c-Si PV module treatment; at plant, for Disposal, plastic waste, unspecified: 0
- economic, Waste c-Si PV panel; takeback and recycling; at treatment plant: 1
- causal, Waste c-Si PV panel; takeback and recycling; at treatment plant, for Diesel, combusted in industrial equipment: 1
- causal, Aluminum scrap; recovered from c-Si PV module treatment; at plant, for Diesel, combusted in industrial equipment: 0
- causal, Waste c-Si PV panel; takeback and recycling; at treatment plant, for Disposal, plastic waste, unspecified: 1
- physical, Waste c-Si PV panel; takeback and recycling; at treatment plant: 1
- causal, Glass cullets; recovered from c-Si PV module treatment; at plant, for Electricity, AC, 120 V: 0
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
## Inventory method
Attributional cradle-to-gate.

## Modelling constants
Latunussa et al. (2016) assumed a transport distance of 100 km by small truck to the collection point, and 400 km by an average truck to the the recycling site. These assumptions were also used by Frischknecht et al. (2020).

## Completeness
Treatment of Missing Environmental Data

Wambach et al. (2017) indicated direct emissions, dust and water were not accounted for.

Treatment of Missing Technosphere

Wambach et al. (2017) offered no information on cutoff criteria or flows that might have not been considered, other than post procesing of the recycled output materials.

Mass Balance

No mass balance was calculated for this process.

## Data selection
This unit process was modeled based on Frischknecht et al. (2020) inventory for the take back and rcyling of used crystalline silicon photovoltaic modules according to the end-of-life approach available on Table 30 of said report.

## Data treatment
The values in the LCI in Frischknecht et al. (2020) and Stoltz et al. (2017) represent a weighted average of five European recyclers.

Process data quality
Based on the information included in the “Data completeness section”, the data quality characteristic (DQC) "Process completeness" was given a score of 2 (60-79 % of determined flow have been evaluated and given a value). It is likely the original report went through a review process, but because it is not explicitly mentioned, the data quality characteristic "Process review" was left as default (No documented review) and thus with a score of 5.

## Data collection
According to Wambach et al. (2017), recyclers were contacted between the calendar years 2015 and 2016, which is taken to be the data collection period.

## Sampling procedure
System boundary conditions

The system boundary is cradle to grave and includes energy use, transport, and waste treatment.

Data collection

The inventory present in Stoltz et al. (2017) was based on the responses to a questionnaire received from five European producers.
Uncertainty
Frischknecht et al. (2020) included a standard deviation for all exchanges, which is repeated here.

## Intended application
Situation C2 - Accounting, without system-external interactions - The intended application is a purely descriptive accounting / documentation of the analyzed system excluding interactions with other systems in the LCI model.
The target audience of this model are LCA practitioners, the silicon, solar and related industries and the general public. The inventory is considered largely complete, except for land transformation activities. For that reason, it is not recommended to use this dataset when evaluating land use impact categories. The results of the National Institute of Standards and Technology’s data gap analysis were analyzed using the ISO 21930-LCIA-US impact assessment methodology, as well as Cumulative Energy Demand and a subset of ReCiPe 2016 impact categories.
The original application of this dataset was the identification of data gaps in the Federal LCA Commons (FLCAC) (see ""Project"" above). However, the intended application is to provide a cradle-to-gate inventory (A1-A3, according to ISO 21930) using exclusively processes currently available in USLCI or generated as part of the project mentioned above, and elementary flows from the Federal Elementary Flow List (FEDEFL) to enable the use of a fuller range of LCIA impact categories than those reported in EPDs. For data quality purposes, the intended application is to provide a US average inventory for the year of publication of the original source.

## Project
This dataset was developed as part of the “Public Life Cycle Inventory Data Gap Analysis for Silicon-based Residential Photovoltaic Systems” National Institute of Standards and Technology’s Technical Note.

## Sources
- Frischknecht et al. (2020) LCI PV
- Latunussa et al. (2016) LCA recycling c-Si
- Stolz et al. (2017) LCA PV recycling
- Wambach et al. (2017) LCI PV recycling
