# Inverter; at plant; 5 kW

Dataset: openLCA process, unit process
Category: 31-33: Manufacturing/3353: Electric Equipment Manufacturing
Geography: Germany
Time period: 2015-12-01 to 2016-12-02
Data quality: US EPA - Process Pedigree Matrix (5; 1)
Exchange data quality scheme: US EPA - Flow Pedigree Matrix
Generated by: Gonzalo Rodriguez-Garcia
Owner: National Institute of Standards and Technology
isCopyrightProtected: false
restrictionsDescription: This data/work was created by employees of the National Institute of Standards and Technology (NIST), an agency of the Federal Government. Pursuant to title 17 United States Code Section 105, works of NIST employees are not subject to copyright protection in the United States.  This data/work may be subject to foreign copyright.
The data/work is provided by NIST as a public service and is expressly provided “AS IS.” NIST MAKES NO WARRANTY OF ANY KIND, EXPRESS, IMPLIED OR STATUTORY, INCLUDING, WITHOUT LIMITATION, THE IMPLIED WARRANTY OF MERCHANTABILITY, FITNESS FOR A PARTICULAR PURPOSE, NON-INFRINGEMENT AND DATA ACCURACY. NIST does not warrant or make any representations regarding the use of the data or the results thereof, including but not limited to the correctness, accuracy, reliability or usefulness of the data. NIST SHALL NOT BE LIABLE AND YOU HEREBY RELEASE NIST FROM LIABILITY FOR ANY INDIRECT, CONSEQUENTIAL, SPECIAL, OR INCIDENTAL DAMAGES (INCLUDING DAMAGES FOR LOSS OF BUSINESS PROFITS, BUSINESS INTERRUPTION, LOSS OF BUSINESS INFORMATION, AND THE LIKE), WHETHER ARISING IN TORT, CONTRACT, OR OTHERWISE, ARISING FROM OR RELATING TO THE DATA (OR THE USE OF OR INABILITY TO USE THIS DATA), EVEN IF NIST HAS BEEN ADVISED OF THE POSSIBILITY OF SUCH DAMAGES.
To the extent that NIST may hold copyright in countries other than the United States, you are hereby granted the non-exclusive irrevocable and unconditional right to print, publish, prepare derivative works and distribute the NIST data, in any medium, or authorize others to do so on your behalf, on a royalty-free basis throughout the world.
You may improve, modify, and create derivative works of the data or any portion of the data, and you may copy and distribute such modifications or works. Modified works should carry a notice stating that you changed the data and should note the date and nature of any such change. Please explicitly acknowledge the National Institute of Standards and Technology as the source of the data:  Data citation recommendations are provided at https://www.nist.gov/open/license.
Permission to use this data is contingent upon your acceptance of the terms of this agreement and upon your providing appropriate acknowledgments of NIST’s creation of the data/work.

## General comment
This cradle-to-gate unit process dataset is for the production of Inverter; at plant; 5 kW.
This unit process includes raw material acquisition; manufacturing; transport; production and use of electricity; disposal of process waste; recovery of used products via reuse, recycling, and energy recovery ancillary materials manufacturing; manufacture and installation of capital equipment. The end-of-life of the product itself is included in the model.

## Technology
This process represent the production of solar inverters using average technology for Europe from the calendar years 2015-2016 (dates are an estimation, see Time description above).
"Inverters usually consist of a transformer, electronic components as control units, a case and some connectors" (Jungbluth et al., 2012, cited in Tschümperlin et al., 2016). In addition to the inverter assembly, the inventory includes external packaging and the disposal of production waste and of the inverter itself at the end of life. The printed board assembly and metals (aluminum, steel, copper) are recycled, while packaging waste is burt in municipal waste incineration plants (Tschümperlin et al., 2016).
Printed board assembly is built with the lead-free mounting technique, which was more common at the time of publication than other techniques (e.g. through-hole mounting with lead).

## Geography
The inventories are based on three leading European producers. Germany is selected as the specific location because it is the country where more inverter producing companies are located according to SolarPowerEurope (2025), and supranational geographies do not work well with regionalized Life Cycle Impact Assessment Methods.

## Time period
Tschümperlin et al. (2016) did not specify any data collection period. The "Valid until" is the date of publication of Tschümperlin's report, and it is assumed the data collection and report writing took a year to complete. Note that specific purpose of their work was to update "old" inventories that were based on data from 10 years prior.

## Reference product
- Inverter; at plant; 5 kW: 1 Item(s)

## Inputs from technosphere
- Tin; at plant: 0.0153688 kg; normal sd 1.31; data quality (2,1,5,1,5)
- Copper wire drawing; at plant: 3.06111 kg; normal sd 1.31; data quality (2,1,5,1,5)
- Aluminium, extrusion, at plant [RNA]: 7.63512 kg; normal sd 1.34; data quality (2,1,5,1,5)
- Low voltage transformer; at plant: 0.0642928 kg; normal sd 1.31; data quality (2,1,5,1,5)
- Polycarbonate, at plant: 0.324112 kg; normal sd 1.31; data quality (2,1,5,1,5); provider Polycarbonate Bridge; Building Systems to USEEIO
- SMD capacitor; surface mounting; at plant: 0.00213754 kg; normal sd 1.31; data quality (2,1,5,1,5)
- Transport, ocean freighter, average fuel mix: 32.5024 t*km; normal sd 2.09; data quality (4,5,5,1,5)
- Film capacitor; thorugh-hole mounted; at plant: 0.266515 kg; normal sd 1.31; data quality (2,1,5,1,5)
- Copper, at regional storage: 3.06111 kg; normal sd 1.31; data quality (2,1,5,1,5); provider Copper, at storage Bridge; Building Systems to USEEIO
- Steel; hot rolled coil, at plant: 1.45288 kg; normal sd 1.31; data quality (2,1,5,1,5)
- Electrolytic capacitor; at plant; <2 cm height: 0.0107582 kg; normal sd 1.31; data quality (2,1,5,1,5)
- Transport, combination truck, average fuel mix: 1.08341 t*km; normal sd 2.09; data quality (4,5,5,1,5)
- Inlet and outlet plugs; for network cable; at plant: 5.57504, 0.446767 Item(s) (2 entries); normal sd 1.31; data quality (2,1,5,1,5)
- Logic Integrated circuit; at plant: 0.248952, 0.1059 kg (2 entries); normal sd 1.31; data quality (2,1,5,1,5)
- Ribbon cable; at plant; 20-pin: 0.00038422 kg; normal sd 1.31; data quality (2,1,5,1,5)
- Ferrite; at plant: 4.08554e-5, 0.055922 kg (2 entries); normal sd 1.31; data quality (2,1,5,1,5)
- Hot rolled sheet, steel, at plant [RNA]: 1.45288 kg; normal sd 1.31; data quality (2,1,5,1,5)
- Ring core choke inductor; at plant: 1.39549, 0.210223 kg (2 entries); normal sd 1.31; data quality (2,1,5,1,5)
- Steel product manufacturing, average metal working: 0.0307376 kg; normal sd 1.34; data quality (4,4,5,1,5)
- Glass fiber, reinforced polymer: 0.0409834, 0.210223 kg (2 entries); normal sd 1.31; data quality (2,1,5,1,5)
- AlMg3 aluminum alloy; at plant: 0.339004 kg; normal sd 1.34; data quality (4,1,5,1,5); provider AlMg3 aluminum alloy Bridge; Building Systems to USLCI
- Transport, train, diesel powered: 3.61138 t*km; normal sd 2.09; data quality (4,5,5,1,5)
- Wirewound resistor; through-hole mounting; at plant: 0.00179303 kg; normal sd 1.31; data quality (2,1,5,1,5)
- SMD glass diode; at plant: 0.00321579 kg; normal sd 1.31; data quality (2,1,5,1,5)
- Polypropylene, PP, virgin resin, at plant [RNA]: 1.41377 kg; normal sd 1.6; data quality (4,1,5,1,5)
- Corrugated product, average production, at mill [US]: 1.05741 kg; normal sd 1.21; data quality (1,1,5,1,5)
- Natural gas, combusted in industrial boiler [RNA]: 5.72409, 14.7497 m3 (2 entries); normal sd 1.34; data quality (4,1,5,1,5)
- Low-density polyethylene packaging film; at plant: 0.0184246 kg; normal sd 1.34; data quality (4,1,5,1,5); provider Packaging film Bridge ; Building Systems to USLCI
- SMD resistor; surface mounting; at plant: 0.00732694 kg; normal sd 1.31; data quality (2,1,5,1,5)
- Unspecified transistor; at plant: 0.0307376 kg; normal sd 1.31; data quality (2,1,5,1,5)
- Electricity, AC, 120 V: 16.9069 kWh; normal sd 1.31; data quality (2,1,5,1,5)
- SMD transistor; surface mounting; at plant: 0.0668655 kg; normal sd 1.31; data quality (2,1,5,1,5)
- Cable, connector for computer, without plugs: 0.210223 kg; normal sd 1.34; data quality (4,1,5,1,5)
- Miniature radio frecuency chip inductor; at plant: 0.00176511 kg; normal sd 1.31; data quality (2,1,5,1,5)
- Printed wiring board, surface mounted, unspec., Pb free, at plant: 0.162102 kg; normal sd 1.31; data quality (2,1,5,1,5)
- Clamp connector; at plant: 0.039088 kg; normal sd 1.31; data quality (2,1,5,1,5)
- Light fuel oil; combusted in industrial boiler; at plant: 0.361455 MJ; normal sd 1.34; data quality (4,1,5,1,5); provider Light fuel oil; combusted in industrial equipment Bridge; Building Systems to USLCI
- Memory integrated circuit; at plant: 0.0029998 kg; normal sd 1.31; data quality (2,1,5,1,5)
- Drinking water treatment; U.S. Average Treatment: 31.8436 l; normal sd 1.34; data quality (4,1,5,1,5)
- Folding boxboard; at plant: 1.85207 kg; normal sd 1.36; data quality (4,1,5,1,5); provider Folding boxboard; Building Systems to USLCI
- Electrolytic capacitor; at plant; >2 cm height: 0.411884 kg; normal sd 1.31; data quality (2,1,5,1,5)
- Metal working factory; to user: 1.75859e-8 Item(s); normal sd 3.05; data quality (1,1,5,1,5)
- Light emitting diode, LED, at plant: 2.30532e-5 kg; normal sd 1.31; data quality (2,1,5,1,5)

## Waste to treatment
- Wastewater treatment level 1; Conventional plug flow activated sludge aggregate, solids reduction; at plant: 0.0318436 m3; normal sd 1.34; data quality (4,1,5,1,5)
- Printed wiring boards; uspecified treatment; at treatment plant: 1.95681 kg; normal sd 1.25; data quality (2,1,5,1,5)
- Disposal, hazardous waste, to incineration: 0.0184246 kg; normal sd 1.25; data quality (2,1,5,1,5)
- Disposal, non-hazardous waste, to incineration: 2.90949 kg; normal sd 1.25; data quality (2,1,5,1,5)
- Disposal, non-hazardous waste, to incineration: 0.388767 kg; normal sd 1.34; data quality (4,1,5,1,5)
- Disposal, hazardous waste, to incineration: 0.0205828 kg; normal sd 1.34; data quality (4,1,5,1,5)

## Emissions to nature
- Water [emission, water]: 0.0605843 m3; normal sd 1.34; data quality (4,1,5,1,5)
- Energy, heat [emission, air]: 60.8649 MJ; normal sd 1.22; data quality (2,1,5,1,5)

## Inventory method
Attributional cradle-to-grave

## Modelling constants
Tschümperlin et al. (2016) assumed a 60 km distance for truck transport, 200 km for train transport, and 18000 km for transoceanic transport. In addition, the amount of materials used in the inventory were extrapolated using a non-linear mass versus power relationship. Because only one of the three manufacturers specified each mounted component, it was assumed all printed board assemblies are composed of the same components, and only differ in total weight and size. This also applies to individual components that are not part of the printed board assembly, with the exception of copper, aluminum, and steel.
No assumptions were reported for the source dataset by the original modelers.

## Completeness
Treatment of Missing Environmental Data
Tschümperlin et al. (2016) offered no information on cutoff criteria or flows that might have not been considered.
Treatment of Missing Technosphere Data
Tschümperlin et al. (2016) offered no information on cutoff criteria or flows that might have not been considered.
Mass Balance
No mass balance was calculated for this process.

## Data selection
This unit process was modeled based on Tschümperlin et al. (2016) inventory for 2.5 kW inverters , available on Table 3.2 of said report.

## Data treatment
The values in the LCI in Tschümperlin et al. (2016) reflect the expert judgement of the authors as, as mentioned in "Modeling constants" above, an important fraction of all data comes from one manufacturer.
Process data quality
Based on the information included in the “Data completeness” section, the data quality characteristic (DQC) “Process completeness” was given a score of 1 (>80 % of determined flow have been evaluated and given a value. The LCA upon which this dataset is based on was “independently verified in accordance with ISO 14044 and the reference Product Category Rules”. Because of that, the data quality characteristic "Process review" was given a score of 3, "Documented review by a third party"

## Data collection
December 2015-November 2016. Assumed to be one year prior to the data of publication of the report, as it does not specify it.

## Sampling procedure
System boundary conditions
The system boundary is cradle to grave and includes direct emissions, material and energy use, transport, waste treatment (of waste generated during production and of the final product) and infrastructure.

Data collection
The inventory present in Tschümperlin et al. (2016) was based on the responses to a questionnaire received from three European producers.

Uncertainty
Tschümperlin et al. (2016) included a standard deviation for all exchanges, which is repeated here.

## Intended application
Situation C2 - Accounting, without system-external interactions - The intended application is a purely descriptive accounting / documentation of the analyzed system excluding interactions with other systems in the LCI model.

The target audience of this model are LCA practitioners, the concrete and related industries, and the general public. The inventory is considered largely complete, except for land transformation activities. For that reason, it is not recommended to use this dataset when evaluating land use impact categories. The results of the National Institute of Standards and Technology’s data gap analysis were analyzed using the ISO 21930-LCIA-US impact assessment methodology.

The original application of this dataset was the identification of data gaps in the Federal LCA Commons (FLCAC) (see "Project" above). However, the intended application is to provide a cradle-to-gate inventory (A1-A3, according to ISO 21930) using exclusively processes currently available in USLCI or generated as part of the project mentioned above, and elementary flows from the Federal Elementary Flow List (FEDEFL) to enable the use of a fuller range of LCIA impact categories than those reported in EPDs. For data quality purposes, the intended application is to provide a US average inventory for the year of publication of the original source.

## Project
This dataset was developed as part of the "Public Life Cycle Inventory Data Gap Analysis through Process Modeling" National Institute of Standards and Technology Technical Note 2338. This dataset was developed after the publication of the Technical Note, and thus it is not discussed there.

## Review Not reviewed
It is likely the original report went through a review process, but because it is not explicitly mentioned, the data quality characteristic "Process review" was left as default (No documented review) and thus with a score of 5.

## Sources
- Frischknecht et al. (2020) LCI PV
- SolarPowerEurope (2025) EU Solar Manufacturing Map
- Tschümperlin et al. (2016) LCA Solar Inverters
