# Silicon; metallurgical grade; at plant

Dataset: openLCA process, unit process
Category: 31-33: Manufacturing/3279: Other Nonmetallic Mineral Product Manufacturing
Geography: United States
Time period: 2001-01-01 to 2020-11-30
Allocation method: economic allocation
Data quality: US EPA - Process Pedigree Matrix (5;2)
Exchange data quality scheme: US EPA - Flow Pedigree Matrix
Generated by: Gonzalo Rodriguez-Garcia
Owner: National Institute of Standards and Technology
isCopyrightProtected: false
restrictionsDescription: This data/work was created by employees of the National Institute of Standards and Technology (NIST), an agency of the Federal Government. Pursuant to title 17 United States Code Section 105, works of NIST employees are not subject to copyright protection in the United States.  This data/work may be subject to foreign copyright.
The data/work is provided by NIST as a public service and is expressly provided “AS IS.” NIST MAKES NO WARRANTY OF ANY KIND, EXPRESS, IMPLIED OR STATUTORY, INCLUDING, WITHOUT LIMITATION, THE IMPLIED WARRANTY OF MERCHANTABILITY, FITNESS FOR A PARTICULAR PURPOSE, NON-INFRINGEMENT AND DATA ACCURACY. NIST does not warrant or make any representations regarding the use of the data or the results thereof, including but not limited to the correctness, accuracy, reliability or usefulness of the data. NIST SHALL NOT BE LIABLE AND YOU HEREBY RELEASE NIST FROM LIABILITY FOR ANY INDIRECT, CONSEQUENTIAL, SPECIAL, OR INCIDENTAL DAMAGES (INCLUDING DAMAGES FOR LOSS OF BUSINESS PROFITS, BUSINESS INTERRUPTION, LOSS OF BUSINESS INFORMATION, AND THE LIKE), WHETHER ARISING IN TORT, CONTRACT, OR OTHERWISE, ARISING FROM OR RELATING TO THE DATA (OR THE USE OF OR INABILITY TO USE THIS DATA), EVEN IF NIST HAS BEEN ADVISED OF THE POSSIBILITY OF SUCH DAMAGES.
To the extent that NIST may hold copyright in countries other than the United States, you are hereby granted the non-exclusive irrevocable and unconditional right to print, publish, prepare derivative works and distribute the NIST data, in any medium, or authorize others to do so on your behalf, on a royalty-free basis throughout the world.
You may improve, modify, and create derivative works of the data or any portion of the data, and you may copy and distribute such modifications or works. Modified works should carry a notice stating that you changed the data and should note the date and nature of any such change. Please explicitly acknowledge the National Institute of Standards and Technology as the source of the data:  Data citation recommendations are provided at https://www.nist.gov/open/license.
Permission to use this data is contingent upon your acceptance of the terms of this agreement and upon your providing appropriate acknowledgments of NIST’s creation of the data/work.

## General comment
This cradle-to-gate unit process dataset is for the production of 1 kg of metallurgical grade silicon, with a purity of over 99 % (Jungbluth et al., 2012).
This unit process includes raw material acquisition; refining; transport; production and use of fuels, and electricity; disposal of process waste; ancillary materials manufacturing; manufacture, and installation of capital equipment.

## Technology
Most of the metallurgical grade silicon is produced by carbothermic reduction, and this inventory is based on said reaction using petrol coke, charcoal and wood chips as reduction agents (Jungbluth et al. 2012).

## Geography
Frischknecht et al. (2015), which is the basis of Frischknecht et al. (2020) and therefore of this inventory, considered that the LCI built in Jungbluth et al. (2012), and which was partially based on data from five Norwegian plants was appropriate to model US production of metallurgical grade silicon, despite Jungbluth et al. (2012) having suggested there were differences in the sources of carbon used in each country.

## Time period
The period spans from the publication date of the latest study used in Jungbluth et al. (2012) to the publication date of Frischknecht et al. (2020), since the model has remained effectively the same throughout this period.

## Reference product
- Silicon; metallurgical grade; at plant: 1 kg; data quality (2,5,1,5,5)

## By-products
- Silica fumes; at plant: 0.55 kg; data quality (4,5,5,1,5)

## Inputs from technosphere
- Silica sand, at plant [United States]: 2.7 kg; normal sd 1.22; data quality (2,5,5,1,5)
- Wood chips; hardwood; green; at sawmill [United States]: 0.00325 kg; normal sd 1.22; data quality (2,5,5,1,5); provider Wood chips; hardwood; green; at sawmill Bridge; Building Systems to USLCI
- Transport, ocean freighter, diesel powered [United States]: 2.55 t*km; normal sd 2.09; data quality (2,5,5,1,5)
- Transport, combination truck, short-haul, diesel powered [United States]: 0.156 t*km; normal sd 2.09; data quality (2,5,5,1,5)
- Oxygen, liquid, at plant [United States]: 0.02 kg; normal sd 1.6; data quality (2,5,5,1,5)
- Charcoal; at plant [United States]: 0.17 kg; normal sd 1; data quality (2,5,5,1,5)
- Metallurgical coke, at plant [United States]: 23.1 MJ; normal sd 1.22; data quality (2,5,5,1,5)
- Silicon factory [United States]: 1e-11 Item(s); normal sd 3.09; data quality (4,5,5,1,5)
- Graphite; at plant [United States]: 0.1 kg; normal sd 1.22; data quality (2,5,5,1,5)
- Electricity, AC, 120 V [United States]: 11 kWh; normal sd 1.22; data quality (2,5,5,1,5); provider Electricity Bridge; Building Systems to US Electricity Baseline
- Petroleum coke, at refinery [United States]: 0.5 kg; normal sd 1.22; data quality (2,5,5,1,5)
- Transport, train, diesel powered [United States]: 0.069 t*km; normal sd 2.09; data quality (2,5,5,1,5)

## Waste to treatment
- Slag; from metallurgical grade silicon production; to landfill; at treatment plant [US]: 0.025 kg; normal sd 1.22; data quality (2,5,5,1,5)

## Emissions to nature
All rows: data quality (4,5,5,1,5)
- Carbon monoxide [emission, air]: 0.00138 kg; normal sd 5.34
  Fossil
- Carbon dioxide [emission, air]: 1.61 kg; normal sd 1.22
  Biogenic
- Carbon monoxide [emission, air]: 0.00062 kg; normal sd 5.34
  Biogenic
- Aluminum [emission, air]: 1.55e-6 kg; normal sd 5.34
- Cadmium [emission, air]: 3.14e-10 kg; normal sd 5.34
- Sodium [emission, air]: 7.75e-7 kg; normal sd 5.34
- Heat, waste [emission, air]: 71.3 kg; normal sd 1.22
- Hydrogen sulfide [emission, air]: 0.0005 kg; normal sd 1.85
- Calcium [emission, air]: 7.75e-7 kg; normal sd 5.34
- Volatile organic compounds [emission, air]: 9.6e-5 kg; normal sd 1.85
- Fluorine [emission, air]: 3.88e-8 kg; normal sd 1.85
- Mercury [emission, air]: 7.85e-9 kg; normal sd 5.34
- Silicon [emission, air]: 0.00751 kg; normal sd 5.34
- Particulate matter, > 10μm [emission, air]: 0.00775 kg; normal sd 1.58
- Carbon dioxide [emission, air]: 3.58 kg; normal sd 1.22
  Fossil
- Lead [emission, air]: 3.44e-7 kg; normal sd 5.34
- Chlorine [emission, air]: 7.85e-8 kg; normal sd 1.85
- Tin [emission, air]: 7.85e-9 kg; normal sd 5.34
- Antimony [emission, air]: 7.85e-9 kg; normal sd 5.34
- Sulfur dioxide [emission, air]: 0.0122 kg; normal sd 1.24
- Potassium [emission, air]: 6.2e-5 kg; normal sd 5.34
- Iron [emission, air]: 3.88e-6 kg; normal sd 5.34
- Arsenic [emission, air]: 9.42e-9 kg; normal sd 5.34
- Cyanide [emission, air]: 6.87e-6 kg; normal sd 1.85
- Boron [emission, air]: 2.79e-7 kg; normal sd 5.34
- Chromium [emission, air]: 7.85e-9 kg; normal sd 5.34
- Hydrofluoric acid [emission, air]: 0.0005 kg; normal sd 1.85
- Nitrogen oxides [emission, air]: 0.00974 kg; normal sd 1.58

## Allocation factors
- causal, Silica fumes; at plant, for Sodium: 0
- causal, Silica fumes; at plant, for Metallurgical coke, at plant: 0
- causal, Silicon; metallurgical grade; at plant, for Wood chips; hardwood; green; at sawmill: 1
- causal, Silica fumes; at plant, for Wood chips; hardwood; green; at sawmill: 0
- causal, Silicon; metallurgical grade; at plant, for Calcium: 1
- causal, Silica fumes; at plant, for Antimony: 0
- causal, Silicon; metallurgical grade; at plant, for Mercury: 1
- causal, Silicon; metallurgical grade; at plant, for Electricity, AC, 120 V: 1
- causal, Silica fumes; at plant, for Carbon monoxide: 0
- causal, Silicon; metallurgical grade; at plant, for Carbon monoxide: 1
- economic, Silicon; metallurgical grade; at plant: 1
- causal, Silica fumes; at plant, for Sulfur dioxide: 0
- physical, Silicon; metallurgical grade; at plant: 0
- causal, Silicon; metallurgical grade; at plant, for Transport, train, diesel powered: 1
- causal, Silica fumes; at plant, for Carbon dioxide: 0
- causal, Silicon; metallurgical grade; at plant, for Charcoal; at plant: 1
- economic, Silica fumes; at plant: 0
- causal, Silica fumes; at plant, for Charcoal; at plant: 0
- causal, Silicon; metallurgical grade; at plant, for Silica sand, at plant: 1
- causal, Silica fumes; at plant, for Lead: 0
- causal, Silicon; metallurgical grade; at plant, for Metallurgical coke, at plant: 1
- causal, Silicon; metallurgical grade; at plant, for Iron: 1
- causal, Silicon; metallurgical grade; at plant, for Hydrogen sulfide: 1
- causal, Silicon; metallurgical grade; at plant, for Boron: 1
- causal, Silicon; metallurgical grade; at plant, for Heat, waste: 1
- causal, Silicon; metallurgical grade; at plant, for Carbon monoxide: 1
- causal, Silica fumes; at plant, for Carbon dioxide: 0
- causal, Silica fumes; at plant, for Aluminum: 0
- causal, Silica fumes; at plant, for Mercury: 0
- causal, Silica fumes; at plant, for Silicon: 0
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
## Inventory method
Attributional cradle-to-gate

## Modelling constants
Jungbluth et al, (2012) assumed that H2S and HF emissions were 0.5 kg/t (their reference said it was less than 1 kg/t each).
Chemical Oxygen Demand (COD), Biological Oxygen Demand (BOD), and Total Organic Carbon (TOC), are three ways of measuring effectively the same pollutant. To prevent triple counting, COD and TOC are set to zero, but the actual amounts are given in the description.

## Completeness
Treatment of Missing Environmental Data
Jungbluth et al, (2012) indicated that the emissions of bismuth with SiO2 particles had not been considered, and that because “information about emissions to water are rare […] it was not possible to consider them for the life cycle inventory”
Treatment of Missing Technosphere Data
Jungbluth et al. (2012) offers no information is on cutoff criteria or flows that might have not been considered.
Mass Balance
0.55 kg of Silica fumes (a.k.a. microsilica, SiO2 dust) was added as output based on Jungbluth et al. (2012), who excluded it from the inventory. However, this addition does not balance inputs and outputs.

## Data selection
Jungbluth et al. (2012) built the inventory based on previous studies. See tables 4.2, 4.3, and 4.4 of said report for additional information.

## Data treatment
The values in the LCI in Jungbluth et al, (2012) reflect the expert judgement of the authors, since they do not seem a weighted average of the different studies.
Process data quality
Based on the information included in the “Data completeness section”, the data quality characteristic (DQC) "Process completeness" was given a score of 2 (60-79 % of determined flow have been evaluated and given a value). It is likely the original report went through a review process, but because it is not explicitly mentioned, the data quality characteristic "Process review" was left as default (No documented review) and thus with a score of 5.

## Data collection
Between calendar years 2001 and 2002, both included, based on the studies cited in Jungbluth et al. (2012)

## Sampling procedure
System boundary conditions
The system boundary is cradle to gate and includes direct emissions, material and energy use, waste treatment, transport, and infrastructure.
Data collection
The data that made Jungbluth et al. (2012) LCI is based on previous reports. See the original source for details.
Uncertainty
Frischknecht et al. (2020) included a standard deviation for all flows, which is repeated here.

## Intended application
Situation C2 - Accounting, without system-external interactions - The intended application is a purely descriptive accounting / documentation of the analyzed system excluding interactions with other systems in the LCI model.
The target audience of this model are LCA practitioners, the silicon, solar and related industries and the general public. The inventory is considered largely complete, except for land transformation activities. For that reason, it is not recommended to use this dataset when evaluating land use impact categories. The results of the National Institute of Standards and Technology’s data gap analysis were analyzed using the ISO 21930-LCIA-US impact assessment methodology, as well as Cumulative Energy Demand and a subset of ReCiPe 2016 impact categories.
The original application of this dataset was the identification of data gaps in the Federal LCA Commons (FLCAC) (see "Project" above). However, the intended application is to provide a cradle-to-gate inventory (A1-A3, according to ISO 21930) using exclusively processes currently available in USLCI or generated as part of the project mentioned above, and elementary flows from the Federal Elementary Flow List (FEDEFL) to enable the use of a fuller range of LCIA impact categories than those reported in EPDs. For data quality purposes, the intended application is to provide a US average inventory for the year of publication of the original source.

## Project
This dataset was developed as part of the “Public Life Cycle Inventory Data Gap Analysis for Silicon-based Photovoltaic panels” National Institute of Standards and Technology’s Technical Note.

## Sources
- Jungbluth et al. (2012) LCI PV
- Frischknecht et al. (2020) LCI PV
- Frischknecht et al. (2015) LCI PV
