# Inverter; at plant; 500 W

Dataset: openLCA process, unit process
Category: 31-33: Manufacturing/3353: Electric Equipment Manufacturing
Geography: Netherlands
Time period: 2000-01-01 to 2004-12-31
Data quality: US EPA - Process Pedigree Matrix (5;1)
Exchange data quality scheme: US EPA - Flow Pedigree Matrix
Generated by: Gonzalo Rodriguez-Garcia
Owner: National Institute of Standards and Technology
isCopyrightProtected: false
restrictionsDescription: "This data/work was created by employees of the National Institute of Standards and Technology (NIST), an agency of the Federal Government. Pursuant to title 17 United States Code Section 105, works of NIST employees are not subject to copyright protection in the United States.  This data/work may be subject to foreign copyright.
The data/work is provided by NIST as a public service and is expressly provided “AS IS.” NIST MAKES NO WARRANTY OF ANY KIND, EXPRESS, IMPLIED OR STATUTORY, INCLUDING, WITHOUT LIMITATION, THE IMPLIED WARRANTY OF MERCHANTABILITY, FITNESS FOR A PARTICULAR PURPOSE, NON-INFRINGEMENT AND DATA ACCURACY. NIST does not warrant or make any representations regarding the use of the data or the results thereof, including but not limited to the correctness, accuracy, reliability or usefulness of the data. NIST SHALL NOT BE LIABLE AND YOU HEREBY RELEASE NIST FROM LIABILITY FOR ANY INDIRECT, CONSEQUENTIAL, SPECIAL, OR INCIDENTAL DAMAGES (INCLUDING DAMAGES FOR LOSS OF BUSINESS PROFITS, BUSINESS INTERRUPTION, LOSS OF BUSINESS INFORMATION, AND THE LIKE), WHETHER ARISING IN TORT, CONTRACT, OR OTHERWISE, ARISING FROM OR RELATING TO THE DATA (OR THE USE OF OR INABILITY TO USE THIS DATA), EVEN IF NIST HAS BEEN ADVISED OF THE POSSIBILITY OF SUCH DAMAGES.
To the extent that NIST may hold copyright in countries other than the United States, you are hereby granted the non-exclusive irrevocable and unconditional right to print, publish, prepare derivative works and distribute the NIST data, in any medium, or authorize others to do so on your behalf, on a royalty-free basis throughout the world.
You may improve, modify, and create derivative works of the data or any portion of the data, and you may copy and distribute such modifications or works. Modified works should carry a notice stating that you changed the data and should note the date and nature of any such change. Please explicitly acknowledge the National Institute of Standards and Technology as the source of the data:  Data citation recommendations are provided at https://www.nist.gov/open/license.
Permission to use this data is contingent upon your acceptance of the terms of this agreement and upon your providing appropriate acknowledgments of NIST’s creation of the data/work."

## General comment
"This cradle-to-gate unit process dataset is for the production of 1 unit of 500 W inverter.
This unit process includes raw material acquisition; manufacturing; transport; production and use of electricity; disposal of process waste; recovery of used products via reuse, recycling, and energy recovery ancillary materials manufacturing; manufacture and installation of capital equipment. The end-of-life of the product itself is included in the model."

## Technology
"This process represent the production of micro solar inverters using average technology for Europe from the calendar years 2000-2004.
""Inverters consist of transformer, electronic components as control units, a case and some connectors (Jungbluth et al., 2012). In addition to the inverter assembly, the inventory includes external packaging and the disposal of production waste and of the inverter itself at the end of life."

## Geography
Inventory is based on the PSI 300 from Philips, which may be manufactured in Eindhoven. De Wild-Scholten (2007 indicated that the geography was for Western Europe, but supranational geographies do not work well with regionalized Life Cycle Impact Assessment Methods.

## Time period
De-Wild Scholten (2007), which is the source used in Jungbluth et al. (2012), indicated the calendar years 2000-2004 as time period. Exact dates are assumed.

## Reference product
- Inverter; at plant; 500 W: 1 Item(s)

## Inputs from technosphere
- Polyethylene, high density, HDPE, virgin resin, at plant: 0.014 kg; normal sd 1.22; data quality (2,1,5,1,5)
- Transport, train, diesel powered: 1.89 t*km; normal sd 2.09; data quality (4,5,5,1,5)
- Copper, at regional storage: 0.02 kg; normal sd 1.22; data quality (2,1,5,1,5); provider Copper, at storage Bridge; Building Systems to USEEIO
- Metal film resitor; through-hole mounting; at plant: 0.001 kg; normal sd 1.22; data quality (2,1,5,1,5)
- Ring core choke inductor; at plant: 0.074 kg; normal sd 1.31; data quality (2,1,5,1,5)
- Film capacitor; thorugh-hole mounted; at plant: 0.072 kg; normal sd 1.31; data quality (2,1,5,1,5)
- Steel; hot rolled coil, at plant: 0.078 kg; normal sd 1.22; data quality (2,1,5,1,5)
  Low-alloyed, includes material and coiling
- Polystyrene, general purpose, GPPS, at plant: 0.13 kg; normal sd 1.22; data quality (2,1,5,1,5)
- Polycarbonate, at plant: 0.068 kg; normal sd 1.22; data quality (2, 1, 5, 1, 5); provider Polycarbonate Bridge; Building Systems to USEEIO
- Metal working factory; to user: 1.04e-9 Item(s); normal sd 3.05; data quality (2,1,5,1,5)
- Logic Integrated circuit; at plant: 0.006 kg; normal sd 1.31; data quality (2,1,5,1,5)
- Printed wiring board, surface mounted, unspec., Pb free, at plant: 0.0596 m2; normal sd 1.22; data quality (2,1,5,1,5)
- Transport, ocean freighter, average fuel mix: 8.09 t*km; normal sd 2.09; data quality (4,5,5,1,5)
- Electricity, AC, 120 V: 4.24 kWh; normal sd 1.31; data quality (2,1,5,1,5); provider Electricity Bridge; Building Systems to US Electricity Baseline
- Glass diode; through-hole mounted; at plant: 0.01 kg; normal sd 1.22; data quality (2,1,5,1,5)
- Copper wire drawing; at plant: 0.02 kg; normal sd 1.22; data quality (2,1,5,1,5)
- Acrylonitrile-butadiene-styrene, ABS, copolymer resin, at plant: 0.148 kg; normal sd 1.22; data quality (2,1,5,1,5)
- Tantalum capacitor; through-hole mounting; at plant: 0.0048 kg; normal sd 1.22; data quality (2,1,5,1,5)
- Electrolytic capacitor; at plant; >2 cm height: 0.054 kg; normal sd 1.31; data quality (2,1,5,1,5)
- Transport, combination truck, average fuel mix: 0.366 t*km; normal sd 2.09; data quality (4,5,5,1,5)
- Small size TH wired transistor; at plant: 0.008 kg; normal sd 1.22; data quality (2,1,5,1,5)
- Aluminium, extrusion, at plant [RNA]: 0.682 kg; normal sd 1.22; data quality (2,1,5,1,5)
  Includes materials and extrusion process
- High voltage transformer; at plant: 0.31 kg; normal sd 1.22; data quality (2,1,5,1,5)
- Polyvinyl chloride resin, suspension grade PVC; at plant [RNA]: 0.002 kg; normal sd 1.22; data quality (2,1,5,1,5)
- Steel sheet rolling; at plant: 0.078 kg; normal sd 1.22; data quality (2,1,5,1,5)
- Corrugated product, average production, at mill [US]: 1.12 kg; normal sd 1.21; data quality (2,1,5,1,5)
  Corrugated board
- Clamp connector; at plant: 0.05 kg; normal sd 1.22; data quality (2,1,5,1,5)
- Styrene acrylonitrile; at plant: 0.002 kg; normal sd 1.22; data quality (2,1,5,1,5)
- Polyethylene fleece; at plant: 0.03 kg; normal sd 1.22; data quality (2,1,5,1,5)

## Waste to treatment
- Disposal, hazardous waste, to incineration: 0.23 kg; normal sd 1.25; data quality (2, 1, 5, 1, 5)
  Plastics Calculation
- Disposal, hazardous waste, to incineration: 0.03 kg; normal sd 1.25; data quality (2, 1, 5, 1, 5)
  Polyethylene
  Calculation
- Disposal, non-hazardous waste, to incineration: 1.12 kg; normal sd 1.25; data quality (2, 1, 5, 1, 5)
  Packaging cardboard
- Disposal, hazardous waste, to incineration: 0.132 kg; normal sd 1.34; data quality (2,1,5,1,5)
  Polystyrene
  Calculation
- Printed wiring boards; uspecified treatment; at treatment plant: 0.69 kg; normal sd 1.25; data quality (2,1,5,1,5)
  Calculation

## Emissions to nature
- Energy, heat [emission, air]: 15.3 MJ; normal sd 1.22; data quality (2, 1, 5, 1, 5)
  Calculation

## Inventory method
Attributional cradle-to-grave.

## Modelling constants
Jungbluth et al. (2012) a standard distance of 60 km is assumed for truck transport, 200 km for train transport, and 18000 km of transoceanic transport.

## Completeness
Treatment of Missing Environmental Data
Jungbluth et al. (2012) offered no information on cutoff criteria or flows that might have not been considered.

Treatment of Missing Technosphere Data
Jungbluth et al. (2012) offered no information on cutoff criteria or flows that might have not been considered.

Mass Balance
No mass balance was calculated for this process.

## Data selection
This unit process was modeled based on Jungbluth et al. (2012) inventory for a 500 W inverter, available on Table 11.25 of said report.

## Data treatment
The values in the LCI in Jungbluth et al. (2012) reflect the expert judgement of the authors. An important fraction of all data comes from one manufacturer and one kind of inverter only.

## Data collection
Data was collected during the calendar years 2000-2004, as indicated in de Wild-Scholten (2007)

## Sampling procedure
System boundary conditions
The system boundary is cradle to grave and includes direct emissions, material and energy use, transport, waste treatment (of waste generated during production and of the final product) and infrastructure.

Data collection
The inventory present in Jungbluth et al. (2012) was based on the production of one inverter, as collected by De Wild-Scholten (2007).

Uncertainty
Jungbluth et al. (2012)) included a standard deviation for all exchanges, which is repeated here."

## Intended application
"Situation C2 - Accounting, without system-external interactions - The intended application is a purely descriptive accounting / documentation of the analyzed system excluding interactions with other systems in the LCI model.
The target audience of this model are LCA practitioners, the silicon, solar and related industries and the general public. The inventory is considered largely complete, except for land transformation activities. For that reason, it is not recommended to use this dataset when evaluating land use impact categories. The results of the National Institute of Standards and Technology’s data gap analysis were analyzed using the ISO 21930-LCIA-US impact assessment methodology, as well as Cumulative Energy Demand and a subset of ReCiPe 2016 impact categories.
The original application of this dataset was the identification of data gaps in the Federal LCA Commons (FLCAC) (see ""Project"" above). However, the intended application is to provide a cradle-to-gate inventory (A1-A3, according to ISO 21930) using exclusively processes currently available in USLCI or generated as part of the project mentioned above, and elementary flows from the Federal Elementary Flow List (FEDEFL) to enable the use of a fuller range of LCIA impact categories than those reported in EPDs. For data quality purposes, the intended application is to provide a US average inventory for the year of publication of the original source."

## Project
This dataset was developed as part of the “Public Life Cycle Inventory Data Gap Analysis for Silicon-based Residential Photovoltaic Systems” National Institute of Standards and Technology’s Technical Note.

## Review Independent external review
Colleagues at the Paul Scherrer Institute are acknowledged for their revision of data, but no other details on their review are available. Because it is not properly documented, the "Process review" data quality entry is left as "5: Not documented"

## Review Dependent internal review
Colleagues at ESU-services Ldt. are acknowledged for their revision of data, but no other details on their review are available. Because it is not properly documented, the "Process review" data quality entry is left as "5: Not documented".

## Sources
- de Wild-Scholten and Alsema (2007) LCI PV
- Jungbluth et al. (2012) LCI PV
