# Silicon; from modified Siemens process, solar grade; at plant

Dataset: openLCA process, unit process
Category: 31-33: Manufacturing/3279: Other Nonmetallic Mineral Product Manufacturing
Geography: United States
Time period: 2019-06-03 to 2020-11-30
Data quality: US EPA - Process Pedigree Matrix (5;2)
Exchange data quality scheme: US EPA - Flow Pedigree Matrix
Generated by: Gonzalo Rodriguez-Garcia
Owner: National Institute of Standards and Technology
isCopyrightProtected: false
restrictionsDescription: This data/work was created by employees of the National Institute of Standards and Technology (NIST), an agency of the Federal Government. Pursuant to title 17 United States Code Section 105, works of NIST employees are not subject to copyright protection in the United States.  This data/work may be subject to foreign copyright.
The data/work is provided by NIST as a public service and is expressly provided “AS IS.” NIST MAKES NO WARRANTY OF ANY KIND, EXPRESS, IMPLIED OR STATUTORY, INCLUDING, WITHOUT LIMITATION, THE IMPLIED WARRANTY OF MERCHANTABILITY, FITNESS FOR A PARTICULAR PURPOSE, NON-INFRINGEMENT AND DATA ACCURACY. NIST does not warrant or make any representations regarding the use of the data or the results thereof, including but not limited to the correctness, accuracy, reliability or usefulness of the data. NIST SHALL NOT BE LIABLE AND YOU HEREBY RELEASE NIST FROM LIABILITY FOR ANY INDIRECT, CONSEQUENTIAL, SPECIAL, OR INCIDENTAL DAMAGES (INCLUDING DAMAGES FOR LOSS OF BUSINESS PROFITS, BUSINESS INTERRUPTION, LOSS OF BUSINESS INFORMATION, AND THE LIKE), WHETHER ARISING IN TORT, CONTRACT, OR OTHERWISE, ARISING FROM OR RELATING TO THE DATA (OR THE USE OF OR INABILITY TO USE THIS DATA), EVEN IF NIST HAS BEEN ADVISED OF THE POSSIBILITY OF SUCH DAMAGES.
To the extent that NIST may hold copyright in countries other than the United States, you are hereby granted the non-exclusive irrevocable and unconditional right to print, publish, prepare derivative works and distribute the NIST data, in any medium, or authorize others to do so on your behalf, on a royalty-free basis throughout the world.
You may improve, modify, and create derivative works of the data or any portion of the data, and you may copy and distribute such modifications or works. Modified works should carry a notice stating that you changed the data and should note the date and nature of any such change. Please explicitly acknowledge the National Institute of Standards and Technology as the source of the data:  Data citation recommendations are provided at https://www.nist.gov/open/license.
Permission to use this data is contingent upon your acceptance of the terms of this agreement and upon your providing appropriate acknowledgments of NIST’s creation of the data/work.

## General comment
This cradle-to-gate unit process dataset is for the production of 1 kg of solar grade silicon, with a purity of over 99.9999999 % (Woodhouse et al., 2012).
This unit process includes raw material acquisition; refining; transport; production and use of fuels, and electricity; ancillary materials manufacturing; manufacture, and installation of capital equipment.

## Technology
This unit process represents the production of solar grade silicon through the modified Siemens process, which includes four key steps: 1) Reaction of metallurgical grade with hydrochloric acid to synthesize SiHCl3 gas, 2) Gas purification through distillation, 3) polysilicon deposition in a Siemens reactor, 4) Crushing. There are additional steps for the recovery of reagents, which can be seen in full in Figure 5.6 of Jungbluth et al. (2012).

## Geography
Frischknecht et al. (2015), which is the basis of Frischknecht et al. (2020) and therefore of this inventory, considered that the LCI built in Jungbluth et al. (2012), and which was partially based on data form Norwegian plants and other Western European sources (as mentioned in (De Wild – Scholten and Alsema, 2007) was appropriate to model US production of metallurgical grade silicon. Energy uses are based on reports referring to Chinese production (Mason and Kaizuka, 2019).

## Time period
The period spans from the publication date of Masson and Kaizuka (2019), the latest study used in Frischknecht et al. (2020), to the publication date of this last report, on which this model is based.

## Reference product
- Silicon; from modified Siemens process, solar grade; at plant: 1 kg; data quality (2,4,5,1,5)

## Inputs from technosphere
- Electricity, AC, 120 V [United States]: 49 kWh; normal sd 1.1; data quality (2,1,5,1,5); provider Electricity Bridge; Building Systems to US Electricity Baseline
  1.18E+1 hydro The rest comes from the grid in Frischknecht et al. (2020)
- Transport, train, diesel powered [United States]: 3.65 kg*km; normal sd 2.09; data quality (4,1,1,1,5)
- Natural gas, combusted in industrial boiler [United States]: 28.8 MJ; normal sd 1.1; data quality (2,1,5,1,5)
- Silicon factory; to user [United States]: 1e-11 Item(s); normal sd 3.05; data quality (4,4,5,2,5)
- Sodium hydroxide; chlor-alkali electrolysis; at plant [United States]: 0.348 kg; normal sd 1.25; data quality (2,4,5,1,5)
- Silicon; metallurgical grade; at plant [United States]: 1.13 kg; normal sd 1.23; data quality (2,4,5,1,5)
- Transport, combination truck, short-haul, diesel powered [United States]: 2.87 kg*km; normal sd 2.09; data quality (4,1,1,1,5); provider Transport, combination truck, short-haul, diesel powered Bridge; Building Systems to USLCI
- Hydrochloric acid, without water, in 30% solution state, at plant [United States]: 1.6 kg; normal sd 1.25; data quality (2,4,5,1,5)
- Hydrogen, at plant [United States]: 0.0501 kg; normal sd 1.25; data quality (2,4,5,1,5); provider Hydrogen Bridge; Building Systems to USLCI

## Emissions to nature
- Chloride [emission, water]: 0.036 kg; normal sd 3.14; data quality (4,5,5,2,5)
- Sodium [emission, water]: 0.0338 kg; normal sd 5.16; data quality (4,5,5,2,5)
- Iron [emission, water]: 5.61e-6 kg; normal sd 5.16; data quality (4,5,5,2,5)
- Nitrogen [emission, water]: 0.000208 kg; normal sd 1.68; data quality (4,5,5,2,5)
- Orthophosphate [emission, water]: 2.8e-6 kg; normal sd 1.68; data quality (4,5,5,2,5)
- Biological Oxygen Demand [emission, water]: 0.00202 kg; normal sd 1.68; data quality (4,5,5,2,2)
- Adsorbable organic halides [emission, air]: 1.26e-5 kg; normal sd 1.68; data quality (4,5,5,2,5)
- Energy, heat [emission, air]: 176 MJ; normal sd 1.23; data quality (4,5,5,2,5)
- Dissolved Organic Carbon [emission, water]: 0 kg; data quality (4,5,5,2,5)
  The original report includes 9.10E-4 kg, that would double count the impact of COD, DOC, and TOC
- Total Organic Carbon [emission, water]: 0 kg; data quality (4,5,5,2,5)
  (same comment as for Dissolved Organic Carbon)
- Chemical Oxygen Demand [emission, water]: 0 kg; data quality (4,5,5,2,5)
  The original report includes 2.05E-4 kg, that would double count the impact of COD, DOC, and TOC
- Zinc [emission, water]: 1.96e-6 kg; normal sd 5.16; data quality (4,5,5,2,5)
- Copper [emission, water]: 1.02e-7 kg; normal sd 3.14; data quality (4,5,5,2,5)

## Inventory method
Attributional cradle-to-gate

## Modelling constants
Frischknecht et al. (2020) split the electricity use between “at grid” and “at run-of-river power plant” roughly 24-76 %, because “one of the most important North American producers mainly relies on hydroelectric power”. Here only electricity “at grid” is used, partially to represent generic US production, partially because currently it is not possible to select one kind of electricity production (i.e., hydropower) from the US Electricity Baseline.
Frischknecht et al (2020) assumed a truck transport of 2000 km for the metallurgical grade silicon, and 100 km for the chemicals, and an additional 600 km train transport for the chemical. They also estimated a 100-year lifetime and a 1 Mt/year production for the factory.
Chemical Oxygen Demand (COD), Biological Oxygen Demand (BOD), and Total Organic Carbon (TOC), are three ways of measuring effectively the same pollutant. To prevent triple counting, COD and TOC are set to zero, but the actual amounts are given in the description.

## Completeness
Treatment of Missing Environmental Data
Jungbluth et al, (2012) and Frischknecht et al. (2015, 2020) did not mention any missing relevant environmental flows. Jungbluth et al, (2012) however, mentioned direct emissions to air were not expected, and that water emissions were not known, and the values included are estimated based on data from MG-silicon purification.
Treatment of Missing Technosphere Data
Jungbluth et al, (2012) and Frischknecht et al. (2015, 2020) offered no information on cutoff criteria or flows that might have not been considered. However, Figure 5.6 in Jungbluth et al. (2012) indicates fumed silica is produced, and that oxygen is required for that reaction. Neither SiO2 appears as an output, nor does O2 appear as an input.
Mass Balance
The mass balance for this process was not calculated.

## Data selection
The inventory present in Frischknecht et al. (2020) Table 7 used here includes new estimations (see Modeling constants above), data from Woodhouse et al. (2019), Mason and Kaizuka (2019), and their previous report Frischknecht et al. (2015), based on Jungbluth et al. (2012), and containing data from De Wild – Scholten and Alsema, (2007)

## Data treatment
The values in the LCI in Frischknecht et al. (2020) reflect the expert judgement of the authors and of the sources they cite, since none suggest a weighted average from different sources/reports.
Process data quality
Based on the information included in the “Data completeness section”, the data quality characteristic (DQC) "Process completeness" was given a score of 2 (60-79 % of determined flow have been evaluated and given a value). It is likely the original report went through a review process, but because it is not explicitly mentioned, the data quality characteristic "Process review" was left as default (No documented review) and thus with a score of 5.

## Data collection
Emissions are taken from a 2002 Environmental Report, raw and ancillary material consumption is based on a dataset from 2007, energy use was taken from 2019 reports, and the transport was specifically estimated for Frischknecht et al. (2020) report.

## Sampling procedure
System boundary conditions
The system boundary is cradle to gate and includes direct emissions, material and energy use, transport, and infrastructure.
Data collection
The inventory present in Frischknecht et al. (2020) Table 7 used different sources. See “Data selection” above for a summary of those sources, and the original report for further details.
Uncertainty
Frischknecht et al. (2020) included a standard deviation for all flows, which is repeated here.

## Intended application
Situation C2 - Accounting, without system-external interactions - The intended application is a purely descriptive accounting / documentation of the analyzed system excluding interactions with other systems in the LCI model.
The target audience of this model are LCA practitioners, the silicon, solar and related industries and the general public. The inventory is considered largely complete, except for land transformation activities. For that reason, it is not recommended to use this dataset when evaluating land use impact categories. The results of the National Institute of Standards and Technology’s data gap analysis were analyzed using the ISO 21930-LCIA-US impact assessment methodology, as well as Cumulative Energy Demand and a subset of ReCiPe 2016 impact categories.
The original application of this dataset was the identification of data gaps in the Federal LCA Commons (FLCAC) (see "Project" above). However, the intended application is to provide a cradle-to-gate inventory (A1-A3, according to ISO 21930) using exclusively processes currently available in USLCI or generated as part of the project mentioned above, and elementary flows from the Federal Elementary Flow List (FEDEFL) to enable the use of a fuller range of LCIA impact categories than those reported in EPDs. For data quality purposes, the intended application is to provide a US average inventory for the year of publication of the original source.

## Project
This dataset was developed as part of the “Public Life Cycle Inventory Data Gap Analysis for Silicon-based Photovoltaic panels” National Institute of Standards and Technology’s Technical Note.

## Sources
- Frischknecht et al. (2020) LCI PV
- Frischknecht et al. (2015) LCI PV
- Jungbluth et al. (2012) LCI PV
- de Wild-Scholten and Alsema (2007) LCI PV
- Woodhouse et al. (2019) Cost Si PV
